# OpenSim document version 40000
Model subject01:
  gravity: 0 -9.80665 0
  length_units: meters
  force_units: N
  credits:
    Delp S.L., Loan J.P., Hoy M.G., Zajac F.E., Topp E.L., Rosen J.M., Thelen D.G., Anderson F.C., Seth A. Notes: 3D, 23 DOF gait model created by D.G. Thelen, Univ. of Wisconsin-Madison, and Ajay Seth, Frank C. Anderson, and Scott L. Delp, Stanford University. Lower extremity joint defintions based on Delp et al. (1990). Low back joint and anthropometry based on Anderson and Pandy (1999, 2001). Planar knee model of Yamaguchi and Zajac (1989). Seth replaced tibia translation constraints with a CustomJoint for the knee and removed the patella to eliminate all kinematic constraints; insertions of the quadrucepts are handled with moving points in the tibia frame as defined by Delp 1990. Number of muscles was reduced by Anderson to improve simulation speed for demonstrations and is not intended to be used in research. License: Creative Commons (CCBY 3.0). You are free to distribute, remix, tweak, and build upon this work, even commercially, as long as you credit us for the original creation. http://creativecommons.org/licenses/by/3.0/ More Information: http://simtk-confluence.stanford.edu:8080/display/OpenSim/Gait+2392+and+2354+Models
  publications:
    Delp, S.L., Loan, J.P., Hoy, M.G., Zajac, F.E., Topp E.L., Rosen, J.M.: An interactive graphics-based model of the lower extremity to study orthopaedic surgical procedures, IEEE Transactions on Biomedical Engineering, vol. 37, pp. 757-767, 1990. Yamaguchi G.T., Zajac F.E.: A planar model of the knee joint to characterize the knee extensor mechanism." J . Biomech. vol. 22. pp. 1-10. 1989. Anderson F.C., Pandy M.G.: A dynamic optimization solution for vertical jumping in three dimensions. Computer Methods in Biomechanics and Biomedical Engineering 2:201-231, 1999. Anderson F.C., Pandy M.G.: Dynamic optimization of human walking. Journal of Biomechanical Engineering 123:381-390, 2001.
  Ground
  BodySet:
    Body pelvis: mass=9.949358 [kg] mass_center=(-0.08300681 0 0) inertia=(0.08684673 0.07358318 0.04891465 0 0 0)
        meshes=(sacrum.vtp pelvis.vtp l_pelvis.vtp)
    Body femur_r: mass=7.85794 mass_center=(0 -0.1907754 0) inertia=(0.1131204 0.02965292 0.1192875 0 0 0)
        meshes=femur_r.vtp
    Body tibia_r: mass=3.132143 mass_center=(0 -0.1652565 0) inertia=(0.04257855 0.004308544 0.04316992 0 0 0)
        meshes=(tibia_r.vtp fibula.vtp)
    Body talus_r: mass=0.08448126 mass_center=(0 0 0) inertia=(0.0008448126 0.0008448126 0.0008448126 0 0 0)
        meshes=talus.vtp
    Body calcn_r: mass=1.056016 mass_center=(0.09725563 0.03 0) inertia=(0.001182738 0.003294769 0.003463732 0 0 0)
        meshes=foot.vtp
    Body toes_r: mass=0.1829864 mass_center=(0.03365045 0.006 -0.01741677)
        inertia=(8.448126e-5 0.0001689625 8.448126e-5 0 0 0) meshes=bofoot.vtp
    Body femur_l: mass=7.85794 mass_center=(0 -0.1907754 0) inertia=(0.1131204 0.02965292 0.1192875 0 0 0)
        meshes=femur_l.vtp
    Body tibia_l: mass=3.132143 mass_center=(0 -0.1652565 0) inertia=(0.04257855 0.004308544 0.04316992 0 0 0)
        meshes=(tibia_l.vtp l_fibula.vtp)
    Body talus_l: mass=0.08448126 mass_center=(0 0 0) inertia=(0.0008448126 0.0008448126 0.0008448126 0 0 0)
        meshes=l_talus.vtp
    Body calcn_l: mass=1.056016 mass_center=(0.09725563 0.03 0) inertia=(0.001182738 0.003294769 0.003463732 0 0 0)
        meshes=l_foot.vtp
    Body toes_l: mass=0.1829864 mass_center=(0.03365045 0.006 0.01741677)
        inertia=(8.448126e-5 0.0001689625 8.448126e-5 0 0 0) meshes=l_bofoot.vtp
    Body torso: mass=28.92351 mass_center=(-0.08380621 0.2792107 0.004260502)
        inertia=(1.245676 0.6382559 1.209265 0 0 0) meshes=(hat_spine.vtp hat_jaw.vtp hat_skull.vtp hat_ribs.vtp)
  JointSet:
    CustomJoint ground_pelvis: socket_parent_frame=ground_offset socket_child_frame=pelvis_offset
      Coordinate pelvis_tilt: default_value=0 range=(-1.570796 1.570796) clamped=false
      Coordinate pelvis_list: default_value=0 range=(-1.570796 1.570796) clamped=false
      Coordinate pelvis_rotation: default_value=0 range=(-1.570796 1.570796) clamped=false
      Coordinate pelvis_tx: default_value=0 range=(-5 5) clamped=false
      Coordinate pelvis_ty: default_value=0.95 range=(-1 2) clamped=false
      Coordinate pelvis_tz: default_value=0 range=(-3 3) clamped=false
      PhysicalOffsetFrame ground_offset: socket_parent=/ground translation=(0 0 0) [meters]
      PhysicalOffsetFrame pelvis_offset: socket_parent=/bodyset/pelvis translation=(0 0 0)
      SpatialTransform:
        TransformAxis rotation1: coordinates=pelvis_tilt axis=(0 0 1) LinearFunction(coefficients=1 0)
        TransformAxis rotation2: coordinates=pelvis_list axis=(1 0 0) LinearFunction(coefficients=1 0)
        TransformAxis rotation3: coordinates=pelvis_rotation axis=(0 1 0) LinearFunction(coefficients=1 0)
        TransformAxis translation1: coordinates=pelvis_tx axis=(1 0 0) LinearFunction(coefficients=1 0)
        TransformAxis translation2: coordinates=pelvis_ty axis=(0 1 0) LinearFunction(coefficients=1 0)
        TransformAxis translation3: coordinates=pelvis_tz axis=(0 0 1) LinearFunction(coefficients=1 0)
    CustomJoint hip_r: socket_parent_frame=pelvis_offset socket_child_frame=femur_r_offset
      Coordinate hip_flexion_r: default_value=0 range=(-2.094395 2.094395) clamped=false
      Coordinate hip_adduction_r: default_value=0 range=(-2.094395 2.094395) clamped=false
      Coordinate hip_rotation_r: default_value=0 range=(-2.094395 2.094395) clamped=false
      PhysicalOffsetFrame pelvis_offset: socket_parent=/bodyset/pelvis translation=(-0.08300681 -0.07133034 0.08171915)
      PhysicalOffsetFrame femur_r_offset: socket_parent=/bodyset/femur_r translation=(0 0 0)
      SpatialTransform: axes_held_at_zero=(translation1 translation2 translation3)
        TransformAxis rotation1: coordinates=hip_flexion_r axis=(0 0 1) LinearFunction(coefficients=1 0)
        TransformAxis rotation2: coordinates=hip_adduction_r axis=(1 0 0) LinearFunction(coefficients=1 0)
        TransformAxis rotation3: coordinates=hip_rotation_r axis=(0 1 0) LinearFunction(coefficients=1 0)
    CustomJoint knee_r: socket_parent_frame=femur_r_offset socket_child_frame=tibia_r_offset
      Coordinate knee_angle_r: default_value=0 range=(-2.094395 0.1745329) clamped=false
      PhysicalOffsetFrame femur_r_offset: socket_parent=/bodyset/femur_r translation=(0 0 0)
      PhysicalOffsetFrame tibia_r_offset: socket_parent=/bodyset/tibia_r translation=(0 0 0)
      SpatialTransform: axes_held_at_zero=(rotation2 rotation3 translation3)
        TransformAxis rotation1: coordinates=knee_angle_r axis=(0 0 1) LinearFunction(coefficients=1 0)
        TransformAxis translation1: coordinates=knee_angle_r axis=(1 0 0)
          MultiplierFunction: scale=1
            SimmSpline: x=(-2.0944 -1.74533 -1.39626 -1.0472 -0.698132 -0.349066 -0.174533 0.197344 0.337395 0.490178 1.52146 2.0944)
                y=(-0.0032 0.00179 0.00411 0.0041 0.00212 -0.001 -0.0031 -0.005227 -0.005435 -0.005574 -0.005435 -0.00525)
        TransformAxis translation2: coordinates=knee_angle_r axis=(0 1 0)
          MultiplierFunction: scale=1.122208
            SimmSpline: x=(-2.0944 -1.22173 -0.523599 -0.349066 -0.174533 0.159149 2.0944)
                y=(-0.4226 -0.4082 -0.399 -0.3976 -0.3966 -0.395264 -0.396)
    CustomJoint ankle_r: socket_parent_frame=tibia_r_offset socket_child_frame=talus_r_offset
      Coordinate ankle_angle_r: default_value=0 range=(-1.570796 1.570796) clamped=false
      PhysicalOffsetFrame tibia_r_offset: socket_parent=/bodyset/tibia_r translation=(0 -0.3806121 0)
      PhysicalOffsetFrame talus_r_offset: socket_parent=/bodyset/talus_r translation=(0 0 0)
      SpatialTransform: axes_held_at_zero=(rotation2 rotation3 translation1 translation2 translation3)
        TransformAxis rotation1: coordinates=ankle_angle_r axis=(-0.1050135 -0.1740224 0.9791263)
            LinearFunction(coefficients=1 0)
    CustomJoint subtalar_r: socket_parent_frame=talus_r_offset socket_child_frame=calcn_r_offset
      Coordinate subtalar_angle_r: default_value=0 range=(-1.570796 1.570796) clamped=false
      PhysicalOffsetFrame talus_r_offset: socket_parent=/bodyset/talus_r translation=(-0.04877 -0.04195 0.00792)
      PhysicalOffsetFrame calcn_r_offset: socket_parent=/bodyset/calcn_r translation=(0 0 0)
      SpatialTransform: axes_held_at_zero=(rotation2 rotation3 translation1 translation2 translation3)
        TransformAxis rotation1: coordinates=subtalar_angle_r axis=(0.7871796 0.6047475 -0.1209495)
            LinearFunction(coefficients=1 0)
    CustomJoint mtp_r: socket_parent_frame=calcn_r_offset socket_child_frame=toes_r_offset
      Coordinate mtp_angle_r: default_value=0 range=(-1.570796 1.570796) clamped=false
      PhysicalOffsetFrame calcn_r_offset: socket_parent=/bodyset/calcn_r translation=(0.1738931 -0.002 0.001074863)
      PhysicalOffsetFrame toes_r_offset: socket_parent=/bodyset/toes_r translation=(0 0 0)
      SpatialTransform: axes_held_at_zero=(rotation2 rotation3 translation1 translation2 translation3)
        TransformAxis rotation1: coordinates=mtp_angle_r axis=(-0.5809544 0 0.8139361) LinearFunction(coefficients=1 0)
    CustomJoint hip_l: socket_parent_frame=pelvis_offset socket_child_frame=femur_l_offset
      Coordinate hip_flexion_l: default_value=0 range=(-2.094395 2.094395) clamped=false
      Coordinate hip_adduction_l: default_value=0 range=(-2.094395 2.094395) clamped=false
      Coordinate hip_rotation_l: default_value=0 range=(-2.094395 2.094395) clamped=false
      PhysicalOffsetFrame pelvis_offset: socket_parent=/bodyset/pelvis
          translation=(-0.08300681 -0.07133034 -0.08171915)
      PhysicalOffsetFrame femur_l_offset: socket_parent=/bodyset/femur_l translation=(0 0 0)
      SpatialTransform: axes_held_at_zero=(translation1 translation2 translation3)
        TransformAxis rotation1: coordinates=hip_flexion_l axis=(0 0 1) LinearFunction(coefficients=1 0)
        TransformAxis rotation2: coordinates=hip_adduction_l axis=(-1 0 0) LinearFunction(coefficients=1 0)
        TransformAxis rotation3: coordinates=hip_rotation_l axis=(0 -1 0) LinearFunction(coefficients=1 0)
    CustomJoint knee_l: socket_parent_frame=femur_l_offset socket_child_frame=tibia_l_offset
      Coordinate knee_angle_l: default_value=0 range=(-2.094395 0.1745329) clamped=false
      PhysicalOffsetFrame femur_l_offset: socket_parent=/bodyset/femur_l translation=(0 0 0)
      PhysicalOffsetFrame tibia_l_offset: socket_parent=/bodyset/tibia_l translation=(0 0 0)
      SpatialTransform: axes_held_at_zero=(rotation2 rotation3 translation3)
        TransformAxis rotation1: coordinates=knee_angle_l axis=(0 0 1) LinearFunction(coefficients=1 0)
        TransformAxis translation1: coordinates=knee_angle_l axis=(1 0 0)
          MultiplierFunction: scale=1
            SimmSpline: x=(-2.0944 -1.74533 -1.39626 -1.0472 -0.698132 -0.349066 -0.174533 0.197344 0.337395 0.490178 1.52146 2.0944)
                y=(-0.0032 0.00179 0.00411 0.0041 0.00212 -0.001 -0.0031 -0.005227 -0.005435 -0.005574 -0.005435 -0.00525)
        TransformAxis translation2: coordinates=knee_angle_l axis=(0 1 0)
          MultiplierFunction: scale=1.122208
            SimmSpline: x=(-2.0944 -1.22173 -0.523599 -0.349066 -0.174533 0.159149 2.0944)
                y=(-0.4226 -0.4082 -0.399 -0.3976 -0.3966 -0.395264 -0.396)
    CustomJoint ankle_l: socket_parent_frame=tibia_l_offset socket_child_frame=talus_l_offset
      Coordinate ankle_angle_l: default_value=0 range=(-1.570796 1.570796) clamped=false
      PhysicalOffsetFrame tibia_l_offset: socket_parent=/bodyset/tibia_l translation=(0 -0.3806121 0)
      PhysicalOffsetFrame talus_l_offset: socket_parent=/bodyset/talus_l translation=(0 0 0)
      SpatialTransform: axes_held_at_zero=(rotation2 rotation3 translation1 translation2 translation3)
        TransformAxis rotation1: coordinates=ankle_angle_l axis=(0.1050135 0.1740224 0.9791263)
            LinearFunction(coefficients=1 0)
    CustomJoint subtalar_l: socket_parent_frame=talus_l_offset socket_child_frame=calcn_l_offset
      Coordinate subtalar_angle_l: default_value=0 range=(-1.570796 1.570796) clamped=false
      PhysicalOffsetFrame talus_l_offset: socket_parent=/bodyset/talus_l translation=(-0.04877 -0.04195 -0.00792)
      PhysicalOffsetFrame calcn_l_offset: socket_parent=/bodyset/calcn_l translation=(0 0 0)
      SpatialTransform: axes_held_at_zero=(rotation2 rotation3 translation1 translation2 translation3)
        TransformAxis rotation1: coordinates=subtalar_angle_l axis=(-0.7871796 -0.6047475 -0.1209495)
            LinearFunction(coefficients=1 0)
    CustomJoint mtp_l: socket_parent_frame=calcn_l_offset socket_child_frame=toes_l_offset
      Coordinate mtp_angle_l: default_value=0 range=(-1.570796 1.570796) clamped=false
      PhysicalOffsetFrame calcn_l_offset: socket_parent=/bodyset/calcn_l translation=(0.1738931 -0.002 -0.001074863)
      PhysicalOffsetFrame toes_l_offset: socket_parent=/bodyset/toes_l translation=(0 0 0)
      SpatialTransform: axes_held_at_zero=(rotation2 rotation3 translation1 translation2 translation3)
        TransformAxis rotation1: coordinates=mtp_angle_l axis=(0.5809544 0 0.8139361) LinearFunction(coefficients=1 0)
    CustomJoint back: socket_parent_frame=pelvis_offset socket_child_frame=torso_offset
      Coordinate lumbar_extension: default_value=0 range=(-1.570796 1.570796) clamped=false
      Coordinate lumbar_bending: default_value=0 range=(-1.570796 1.570796) clamped=false
      Coordinate lumbar_rotation: default_value=0 range=(-1.570796 1.570796) clamped=false
      PhysicalOffsetFrame pelvis_offset: socket_parent=/bodyset/pelvis translation=(-0.1182289 0.08794891 0)
      PhysicalOffsetFrame torso_offset: socket_parent=/bodyset/torso translation=(0 0 0)
      SpatialTransform: axes_held_at_zero=(translation1 translation2 translation3)
        TransformAxis rotation1: coordinates=lumbar_extension axis=(0 0 1) LinearFunction(coefficients=1 0)
        TransformAxis rotation2: coordinates=lumbar_bending axis=(1 0 0) LinearFunction(coefficients=1 0)
        TransformAxis rotation3: coordinates=lumbar_rotation axis=(0 1 0) LinearFunction(coefficients=1 0)
  ForceSet:
    DeGrooteFregly2016Muscle [values shared by the 54 below unless stated]: min_control=0.01 max_control=1
        max_contraction_velocity=10 ignore_tendon_compliance=true activation_time_constant=0.01
        deactivation_time_constant=0.04 default_activation=0.05 active_force_width_scale=1.5 fiber_damping=0
        passive_fiber_strain_at_one_norm_force=0.6 tendon_strain_at_one_norm_force=0.033
        ignore_passive_fiber_force=true
    DeGrooteFregly2016Muscle glut_med1_r: max_isometric_force=1119 optimal_fiber_length=0.05759228
        tendon_slack_length=0.08396632 pennation_angle_at_optimal=0.1396263 [radians]
      PathPoint P1: pelvis (-0.04790209 0.03280548 0.1183215)
      PathPoint P2: femur_r (-0.0218 -0.01312984 0.04398068)
    DeGrooteFregly2016Muscle glut_med2_r: max_isometric_force=873 optimal_fiber_length=0.08702192
        tendon_slack_length=0.0545818 pennation_angle_at_optimal=0
      PathPoint P1: pelvis (-0.1003831 0.04802118 0.07496631)
      PathPoint P2: femur_r (-0.0258 -0.006508808 0.04176183)
    DeGrooteFregly2016Muscle glut_med3_r: max_isometric_force=1000 optimal_fiber_length=0.06494246
        tendon_slack_length=0.05328097 pennation_angle_at_optimal=0.3316126
      PathPoint P1: pelvis (-0.1435889 0.01133084 0.06341798)
      PathPoint P2: femur_r (-0.0309 -0.005274379 0.04104863)
    DeGrooteFregly2016Muscle bifemlh_r: max_isometric_force=2700 optimal_fiber_length=0.1192325
        tendon_slack_length=0.3566035 pennation_angle_at_optimal=0
      PathPoint P1: pelvis (-0.147886 -0.1106861 0.06795902)
      PathPoint P2: tibia_r (-0.0301 -0.0318652 0.02929003)
      PathPoint P3: tibia_r (-0.0234 -0.04983363 0.03413686)
    DeGrooteFregly2016Muscle bifemsh_r: max_isometric_force=804 optimal_fiber_length=0.1843698
        tendon_slack_length=0.09484918 pennation_angle_at_optimal=0.4014257
      PathPoint P1: femur_r (0.005 -0.2368982 0.0185432)
      PathPoint P2: tibia_r (-0.0301 -0.0318652 0.02929003)
      PathPoint P3: tibia_r (-0.0234 -0.04983363 0.03413686)
    DeGrooteFregly2016Muscle sar_r: max_isometric_force=156 optimal_fiber_length=0.5599315
        tendon_slack_length=0.1076791 pennation_angle_at_optimal=0
      PathPoint P1: pelvis (-0.01796329 -0.001402866 0.1215511)
      PathPoint P2: femur_r (-0.003 -0.4004039 -0.03336192)
      PathPoint P3: tibia_r (-0.0056 -0.03708755 -0.03971023)
      PathPoint P4: tibia_r (0.006 -0.05213501 -0.03811784)
      PathPoint P5: tibia_r (0.0243 -0.07435213 -0.02508014)
    DeGrooteFregly2016Muscle add_mag2_r: max_isometric_force=2343 optimal_fiber_length=0.1336959
        tendon_slack_length=0.132591 pennation_angle_at_optimal=0.05235988
      PathPoint P1: pelvis (-0.09756529 -0.128632 0.03014311)
      PathPoint P2: femur_r (0.0054 -0.2564246 0.01798849)
    DeGrooteFregly2016Muscle tfl_r: max_isometric_force=233 optimal_fiber_length=0.1035814
        tendon_slack_length=0.4633904 pennation_angle_at_optimal=0.05235988
      PathPoint P1: pelvis (-0.03651361 0.02309333 0.1214533)
      PathPoint P2: femur_r (0.0294 -0.1116597 0.04730894)
      PathPoint P3: femur_r (0.0054 -0.4543822 0.02829027)
      PathPoint P4: tibia_r (0.006 -0.04310653 0.02955874)
    DeGrooteFregly2016Muscle pect_r: max_isometric_force=266 optimal_fiber_length=0.1048529
        tendon_slack_length=0.03460144 pennation_angle_at_optimal=0
      PathPoint P1: pelvis (-0.05060246 -0.08287701 0.04413813)
      PathPoint P2: femur_r (-0.0122 -0.09224553 0.02004885)
    DeGrooteFregly2016Muscle grac_r: max_isometric_force=162 optimal_fiber_length=0.3803973
        tendon_slack_length=0.1361649 pennation_angle_at_optimal=0.05235988
      PathPoint P1: pelvis (-0.08689299 -0.1280925 0.02734411)
      ConditionalPathPoint P2: tibia_r (-0.02657 -0.02823611 -0.0375605)
          socket_coordinate=/jointset/knee_r/knee_angle_r range=(-0.436332 0.174533) [radians]
      PathPoint P3: tibia_r (-0.01943 -0.04561149 -0.03562973)
      PathPoint P4: tibia_r (0.006 -0.07399807 -0.02269156)
    DeGrooteFregly2016Muscle glut_max1_r: max_isometric_force=573 optimal_fiber_length=0.1526355
        tendon_slack_length=0.1343622 pennation_angle_at_optimal=0.08726646
      PathPoint P1: pelvis (-0.1403015 0.06604262 0.06850707)
      PathPoint P2: pelvis (-0.1515726 0.001294953 0.08671038)
      PathPoint P3: femur_r (-0.0457 -0.02783077 0.03106383)
      PathPoint P4: femur_r (-0.0277 -0.06351699 0.0372449)
    DeGrooteFregly2016Muscle glut_max2_r: max_isometric_force=819 optimal_fiber_length=0.16043
        tendon_slack_length=0.1386028 pennation_angle_at_optimal=0
      PathPoint P1: pelvis (-0.1583822 0.01899265 0.05509926)
      PathPoint P2: pelvis (-0.1615522 -0.05611464 0.08945066)
      PathPoint P3: femur_r (-0.0426 -0.05947704 0.02321863)
      PathPoint P4: femur_r (-0.0156 -0.1140164 0.03320343)
    DeGrooteFregly2016Muscle glut_max3_r: max_isometric_force=552 optimal_fiber_length=0.1551507
        tendon_slack_length=0.1562281 pennation_angle_at_optimal=0.08726646
      PathPoint P1: pelvis (-0.1826854 -0.03388461 0.0056763)
      PathPoint P2: pelvis (-0.1795154 -0.1135242 0.0394405)
      PathPoint P3: femur_r (-0.0299 -0.1168219 0.010698)
      PathPoint P4: femur_r (-0.006 -0.1592414 0.03256947)
    DeGrooteFregly2016Muscle iliacus_r: max_isometric_force=1073 optimal_fiber_length=0.1098992
        tendon_slack_length=0.1098992 pennation_angle_at_optimal=0.1221731
      PathPoint P1: pelvis (-0.07913238 0.03938816 0.08357863)
      PathPoint P2: pelvis (-0.03029103 -0.05935202 0.07937034)
      ConditionalPathPoint P3: pelvis (-0.03381324 -0.08686978 0.07985967)
          socket_coordinate=/jointset/hip_r/hip_flexion_r range=(-1.5708 0.785398)
      PathPoint P4: femur_r (0.0017 -0.06093591 0.004516934)
      PathPoint P5: femur_r (-0.0193 -0.06968914 0.01022254)
    DeGrooteFregly2016Muscle psoas_r: max_isometric_force=1113 optimal_fiber_length=0.1088078
        tendon_slack_length=0.1740925 pennation_angle_at_optimal=0.1396263
      PathPoint P1: pelvis (-0.07596239 0.09571863 0.02828363)
      PathPoint P2: pelvis (-0.02794289 -0.06151028 0.07428124)
      ConditionalPathPoint P3: pelvis (-0.03381324 -0.08686978 0.07985967)
          socket_coordinate=/jointset/hip_r/hip_flexion_r range=(-1.5708 0.785398)
      PathPoint P4: femur_r (0.0016 -0.05689596 0.00301129)
      PathPoint P5: femur_r (-0.0188 -0.06699584 0.008241424)
    DeGrooteFregly2016Muscle quad_fem_r: max_isometric_force=381 optimal_fiber_length=0.0485361
        tendon_slack_length=0.0215716 pennation_angle_at_optimal=0
      PathPoint P1: pelvis (-0.1341963 -0.1242076 0.05089097)
      PathPoint P2: femur_r (-0.0381 -0.04028728 0.02900347)
    DeGrooteFregly2016Muscle gem_r: max_isometric_force=164 optimal_fiber_length=0.02257283
        tendon_slack_length=0.03668084 pennation_angle_at_optimal=0
      PathPoint P1: pelvis (-0.1330222 -0.08848847 0.06987722)
      PathPoint P2: femur_r (-0.0142 -0.003703288 0.0351053)
    DeGrooteFregly2016Muscle peri_r: max_isometric_force=444 optimal_fiber_length=0.02621414
        tendon_slack_length=0.1159472 pennation_angle_at_optimal=0.1745329
      PathPoint P1: pelvis (-0.1639003 0.0003237383 0.0229988)
      PathPoint P2: pelvis (-0.1400667 -0.02978392 0.06429878)
      PathPoint P3: femur_r (-0.0148 -0.00403995 0.03462983)
    DeGrooteFregly2016Muscle rect_fem_r: max_isometric_force=1169 optimal_fiber_length=0.1288072
        tendon_slack_length=0.3502652 pennation_angle_at_optimal=0.08726646
      PathPoint P1: pelvis (-0.03463509 -0.03356087 0.0947355)
      ConditionalPathPoint P2: femur_r (0.0334 -0.45225 0.001505645) socket_coordinate=/jointset/knee_r/knee_angle_r
          range=(-2.61799 -1.45997)
      MovingPathPoint P3: tibia_r socket_x_coordinate=/jointset/knee_r/knee_angle_r
          socket_y_coordinate=/jointset/knee_r/knee_angle_r socket_z_coordinate=/jointset/knee_r/knee_angle_r
        x_location: MultiplierFunction: scale=1
          SimmSpline: x=(-2.0944 -1.99997 -1.5708 -1.45752 -1.39626 -1.0472 -0.698132 -0.526391 -0.349066 -0.174533 0 0.00017453 0.00034907 0.0279253 0.0872665 0.174533 2.0944)
              y=(0.0155805 0.0179938 0.0275081 0.0296564 0.0307615 0.0365695 0.0422074 0.0450902 0.048391 0.0534299 0.0617576 0.0617669 0.0617762 0.0633083 0.066994 0.0733035 0.0573481)
        y_location: MultiplierFunction: scale=0.8851444
          SimmSpline: x=(-2.0944 -1.99997 -1.5708 -1.45752 -1.39626 -1.0472 -0.698132 -0.526391 -0.349066 -0.174533 0 0.00017453 0.00034907 0.0279253 0.0872665 0.174533 2.0944)
              y=(0.0234116 0.0237613 0.0251141 0.0252795 0.0253146 0.0249184 0.0242373 0.0238447 0.0234197 0.0227644 0.020984 0.0209814 0.0209788 0.0205225 0.0191754 0.0159554 -0.0673774)
        z_location: MultiplierFunction: scale=0.9952438
          SimmSpline: x=(-2.0944 0.1745) y=(0.0014 0.0014)
    DeGrooteFregly2016Muscle vas_int_r: max_isometric_force=5000 optimal_fiber_length=0.1225524
        tendon_slack_length=0.1328606 pennation_angle_at_optimal=0.05235988
      PathPoint P1: femur_r (0.029 -0.2159129 0.02456578)
      PathPoint P2: femur_r (0.0335 -0.2338682 0.02258467)
      ConditionalPathPoint P3: femur_r (0.0343 -0.45225 0.004358445) socket_coordinate=/jointset/knee_r/knee_angle_r
          range=(-2.61799 -1.42)
      MovingPathPoint P4: tibia_r socket_x_coordinate=/jointset/knee_r/knee_angle_r
          socket_y_coordinate=/jointset/knee_r/knee_angle_r socket_z_coordinate=/jointset/knee_r/knee_angle_r
        x_location: MultiplierFunction: scale=1
          SimmSpline: x=(-2.0944 -1.99997 -1.5708 -1.45752 -1.39626 -1.0472 -0.698132 -0.526391 -0.349066 -0.174533 0 0.00017453 0.00034907 0.0279253 0.0872665 0.174533 2.0944)
              y=(0.0082733 0.0106866 0.0202042 0.022353 0.0234583 0.0292715 0.0349465 0.037871 0.0412569 0.0465287 0.0554632 0.0554735 0.0554837 0.0571717 0.061272 0.0684368 0.0648818)
        y_location: MultiplierFunction: scale=0.8851444
          SimmSpline: x=(-2.0944 -1.99997 -1.5708 -1.45752 -1.39626 -1.0472 -0.698132 -0.526391 -0.349066 -0.174533 0 0.00017453 0.00034907 0.0279253 0.0872665 0.174533 2.0944)
              y=(0.025599 0.0259487 0.0273124 0.0274796 0.0275151 0.0271363 0.0265737 0.0263073 0.0261187 0.0260129 0.0252923 0.0252911 0.0252898 0.0250526 0.0242191 0.0218288 -0.0685706)
        z_location: MultiplierFunction: scale=0.9952438
          SimmSpline: x=(-2.0944 2.0944) y=(0.0018 0.0018)
    DeGrooteFregly2016Muscle med_gas_r: max_isometric_force=2500 optimal_fiber_length=0.08008829
        tendon_slack_length=0.3203531 pennation_angle_at_optimal=0.296706
      PathPoint P1: femur_r (-0.019 -0.4409157 -0.01862245)
      ConditionalPathPoint P2: femur_r (-0.03 -0.4513522 -0.02044507) socket_coordinate=/jointset/knee_r/knee_angle_r
          range=(-0.785398 0.174533)
      PathPoint P3: calcn_r (0 0.031 -0.005274792)
    DeGrooteFregly2016Muscle soleus_r: max_isometric_force=4000 optimal_fiber_length=0.04462536
        tendon_slack_length=0.2231268 pennation_angle_at_optimal=0.4363323
      PathPoint P1: tibia_r (-0.0024 -0.1356926 0.007066231)
      PathPoint P2: calcn_r (0 0.031 -0.005274792)
    DeGrooteFregly2016Muscle tib_post_r: max_isometric_force=3600 optimal_fiber_length=0.02787629
        tendon_slack_length=0.2787629 pennation_angle_at_optimal=0.2094395
      PathPoint P1: tibia_r (-0.0094 -0.1193175 0.001890963)
      PathPoint P2: tibia_r (-0.0144 -0.358572 -0.02279108)
      PathPoint P3: calcn_r (0.0405556 0.0334 -0.02846397)
      PathPoint P4: calcn_r (0.07508135 0.0159 -0.02796635)
    DeGrooteFregly2016Muscle tib_ant_r: max_isometric_force=3000 optimal_fiber_length=0.08783277
        tendon_slack_length=0.1998644 pennation_angle_at_optimal=0.08726646
      PathPoint P1: tibia_r (0.0179 -0.1437475 0.0114453)
      PathPoint P2: tibia_r (0.0329 -0.3497206 -0.01761582)
      PathPoint P3: calcn_r (0.1134001 0.0178 -0.03035494)
    DeGrooteFregly2016Muscle glut_med1_l: max_isometric_force=1119 optimal_fiber_length=0.05759228
        tendon_slack_length=0.08396632 pennation_angle_at_optimal=0.1396263
      PathPoint P1: pelvis (-0.04790209 0.03280548 -0.1183215)
      PathPoint P2: femur_l (-0.0218 -0.01312984 -0.04398068)
    DeGrooteFregly2016Muscle glut_med2_l: max_isometric_force=873 optimal_fiber_length=0.08702192
        tendon_slack_length=0.0545818 pennation_angle_at_optimal=0
      PathPoint P1: pelvis (-0.1003831 0.04802118 -0.07496631)
      PathPoint P2: femur_l (-0.0258 -0.006508808 -0.04176183)
    DeGrooteFregly2016Muscle glut_med3_l: max_isometric_force=1000 optimal_fiber_length=0.06494246
        tendon_slack_length=0.05328097 pennation_angle_at_optimal=0.3316126
      PathPoint P1: pelvis (-0.1435889 0.01133084 -0.06341798)
      PathPoint P2: femur_l (-0.0309 -0.005274379 -0.04104863)
    DeGrooteFregly2016Muscle bifemlh_l: max_isometric_force=2700 optimal_fiber_length=0.1192325
        tendon_slack_length=0.3566035 pennation_angle_at_optimal=0
      PathPoint P1: pelvis (-0.147886 -0.1106861 -0.06795902)
      PathPoint P2: tibia_l (-0.0301 -0.0318652 -0.02929003)
      PathPoint P3: tibia_l (-0.0234 -0.04983363 -0.03413686)
    DeGrooteFregly2016Muscle bifemsh_l: max_isometric_force=804 optimal_fiber_length=0.1843698
        tendon_slack_length=0.09484918 pennation_angle_at_optimal=0.4014257
      PathPoint P1: femur_l (0.005 -0.2368982 -0.0185432)
      PathPoint P2: tibia_l (-0.0301 -0.0318652 -0.02929003)
      PathPoint P3: tibia_l (-0.0234 -0.04983363 -0.03413686)
    DeGrooteFregly2016Muscle sar_l: max_isometric_force=156 optimal_fiber_length=0.5599315
        tendon_slack_length=0.1076791 pennation_angle_at_optimal=0
      PathPoint P1: pelvis (-0.01796329 -0.001402866 -0.1215511)
      PathPoint P2: femur_l (-0.003 -0.4004039 0.03336192)
      PathPoint P3: tibia_l (-0.0056 -0.03708755 0.03971023)
      PathPoint P4: tibia_l (0.006 -0.05213501 0.03811784)
      PathPoint P5: tibia_l (0.0243 -0.07435213 0.02508014)
    DeGrooteFregly2016Muscle add_mag2_l: max_isometric_force=2343 optimal_fiber_length=0.1336959
        tendon_slack_length=0.132591 pennation_angle_at_optimal=0.05235988
      PathPoint P1: pelvis (-0.09756529 -0.128632 -0.03014311)
      PathPoint P2: femur_l (0.0054 -0.2564246 -0.01798849)
    DeGrooteFregly2016Muscle tfl_l: max_isometric_force=233 optimal_fiber_length=0.1035814
        tendon_slack_length=0.4633904 pennation_angle_at_optimal=0.05235988
      PathPoint P1: pelvis (-0.03651361 0.02309333 -0.1214533)
      PathPoint P2: femur_l (0.0294 -0.1116597 -0.04730894)
      PathPoint P3: femur_l (0.0054 -0.4543822 -0.02829027)
      PathPoint P4: tibia_l (0.006 -0.04310653 -0.02955874)
    DeGrooteFregly2016Muscle pect_l: max_isometric_force=266 optimal_fiber_length=0.1048529
        tendon_slack_length=0.03460144 pennation_angle_at_optimal=0
      PathPoint P1: pelvis (-0.05060246 -0.08287701 -0.04413813)
      PathPoint P2: femur_l (-0.0122 -0.09224553 -0.02004885)
    DeGrooteFregly2016Muscle grac_l: max_isometric_force=162 optimal_fiber_length=0.3803973
        tendon_slack_length=0.1361649 pennation_angle_at_optimal=0.05235988
      PathPoint P1: pelvis (-0.08689299 -0.1280925 -0.02734411)
      ConditionalPathPoint P2: tibia_l (-0.02657 -0.02823611 0.0375605) socket_coordinate=/jointset/knee_l/knee_angle_l
          range=(-0.436332 0.174533)
      PathPoint P3: tibia_l (-0.01943 -0.04561149 0.03562973)
      PathPoint P4: tibia_l (0.006 -0.07399807 0.02269156)
    DeGrooteFregly2016Muscle glut_max1_l: max_isometric_force=573 optimal_fiber_length=0.1526355
        tendon_slack_length=0.1343622 pennation_angle_at_optimal=0.08726646
      PathPoint P1: pelvis (-0.1403015 0.06604262 -0.06850707)
      PathPoint P2: pelvis (-0.1515726 0.001294953 -0.08671038)
      PathPoint P3: femur_l (-0.0457 -0.02783077 -0.03106383)
      PathPoint P4: femur_l (-0.0277 -0.06351699 -0.0372449)
    DeGrooteFregly2016Muscle glut_max2_l: max_isometric_force=819 optimal_fiber_length=0.16043
        tendon_slack_length=0.1386028 pennation_angle_at_optimal=0
      PathPoint P1: pelvis (-0.1583822 0.01899265 -0.05509926)
      PathPoint P2: pelvis (-0.1615522 -0.05611464 -0.08945066)
      PathPoint P3: femur_l (-0.0426 -0.05947704 -0.02321863)
      PathPoint P4: femur_l (-0.0156 -0.1140164 -0.03320343)
    DeGrooteFregly2016Muscle glut_max3_l: max_isometric_force=552 optimal_fiber_length=0.1551507
        tendon_slack_length=0.1562281 pennation_angle_at_optimal=0.08726646
      PathPoint P1: pelvis (-0.1826854 -0.03388461 -0.0056763)
      PathPoint P2: pelvis (-0.1795154 -0.1135242 -0.0394405)
      PathPoint P3: femur_l (-0.0299 -0.1168219 -0.010698)
      PathPoint P4: femur_l (-0.006 -0.1592414 -0.03256947)
    DeGrooteFregly2016Muscle iliacus_l: max_isometric_force=1073 optimal_fiber_length=0.1098992
        tendon_slack_length=0.1098992 pennation_angle_at_optimal=0.1221731
      PathPoint P1: pelvis (-0.07913238 0.03938816 -0.08357863)
      PathPoint P2: pelvis (-0.03029103 -0.05935202 -0.07937034)
      ConditionalPathPoint P3: pelvis (-0.03381324 -0.08686978 -0.07985967)
          socket_coordinate=/jointset/hip_l/hip_flexion_l range=(-1.5708 0.785398)
      PathPoint P4: femur_l (0.0017 -0.06093591 -0.004516934)
      PathPoint P5: femur_l (-0.0193 -0.06968914 -0.01022254)
    DeGrooteFregly2016Muscle psoas_l: max_isometric_force=1113 optimal_fiber_length=0.1088078
        tendon_slack_length=0.1740925 pennation_angle_at_optimal=0.1396263
      PathPoint P1: pelvis (-0.07596239 0.09571863 -0.02828363)
      PathPoint P2: pelvis (-0.02794289 -0.06151028 -0.07428124)
      ConditionalPathPoint P3: pelvis (-0.03381324 -0.08686978 -0.07985967)
          socket_coordinate=/jointset/hip_l/hip_flexion_l range=(-1.5708 0.785398)
      PathPoint P4: femur_l (0.0016 -0.05689596 -0.00301129)
      PathPoint P5: femur_l (-0.0188 -0.06699584 -0.008241424)
    DeGrooteFregly2016Muscle quad_fem_l: max_isometric_force=381 optimal_fiber_length=0.0485361
        tendon_slack_length=0.0215716 pennation_angle_at_optimal=0
      PathPoint P1: pelvis (-0.1341963 -0.1242076 -0.05089097)
      PathPoint P2: femur_l (-0.0381 -0.04028728 -0.02900347)
    DeGrooteFregly2016Muscle gem_l: max_isometric_force=164 optimal_fiber_length=0.02257283
        tendon_slack_length=0.03668084 pennation_angle_at_optimal=0
      PathPoint P1: pelvis (-0.1330222 -0.08848847 -0.06987722)
      PathPoint P2: femur_l (-0.0142 -0.003703288 -0.0351053)
    DeGrooteFregly2016Muscle peri_l: max_isometric_force=444 optimal_fiber_length=0.02621414
        tendon_slack_length=0.1159472 pennation_angle_at_optimal=0.1745329
      PathPoint P1: pelvis (-0.1639003 0.0003237383 -0.0229988)
      PathPoint P2: pelvis (-0.1400667 -0.02978392 -0.06429878)
      PathPoint P3: femur_l (-0.0148 -0.00403995 -0.03462983)
    DeGrooteFregly2016Muscle rect_fem_l: max_isometric_force=1169 optimal_fiber_length=0.1288072
        tendon_slack_length=0.3502652 pennation_angle_at_optimal=0.08726646
      PathPoint P1: pelvis (-0.03463509 -0.03356087 -0.0947355)
      ConditionalPathPoint P2: femur_l (0.0334 -0.45225 -0.001505645) socket_coordinate=/jointset/knee_l/knee_angle_l
          range=(-2.61799 -1.45997)
      MovingPathPoint P3: tibia_l socket_x_coordinate=/jointset/knee_l/knee_angle_l
          socket_y_coordinate=/jointset/knee_l/knee_angle_l socket_z_coordinate=/jointset/knee_l/knee_angle_l
        x_location: MultiplierFunction: scale=1
          SimmSpline: x=(-2.0944 -1.99997 -1.5708 -1.45752 -1.39626 -1.0472 -0.698132 -0.526391 -0.349066 -0.174533 0 0.00017453 0.00034907 0.0279253 0.0872665 0.174533 2.0944)
              y=(0.0155805 0.0179938 0.0275081 0.0296564 0.0307615 0.0365695 0.0422074 0.0450902 0.048391 0.0534299 0.0617576 0.0617669 0.0617762 0.0633083 0.066994 0.0733035 0.0573481)
        y_location: MultiplierFunction: scale=0.8851444
          SimmSpline: x=(-2.0944 -1.99997 -1.5708 -1.45752 -1.39626 -1.0472 -0.698132 -0.526391 -0.349066 -0.174533 0 0.00017453 0.00034907 0.0279253 0.0872665 0.174533 2.0944)
              y=(0.0234116 0.0237613 0.0251141 0.0252795 0.0253146 0.0249184 0.0242373 0.0238447 0.0234197 0.0227644 0.020984 0.0209814 0.0209788 0.0205225 0.0191754 0.0159554 -0.0673774)
        z_location: MultiplierFunction: scale=0.9952438
          SimmSpline: x=(-2.0944 0.1745) y=(-0.0014 -0.0014)
    DeGrooteFregly2016Muscle vas_int_l: max_isometric_force=5000 optimal_fiber_length=0.1225524
        tendon_slack_length=0.1328606 pennation_angle_at_optimal=0.05235988
      PathPoint P1: femur_l (0.029 -0.2159129 -0.02456578)
      PathPoint P2: femur_l (0.0335 -0.2338682 -0.02258467)
      ConditionalPathPoint P3: femur_l (0.0343 -0.45225 -0.004358445) socket_coordinate=/jointset/knee_l/knee_angle_l
          range=(-2.61799 -1.42)
      MovingPathPoint P4: tibia_l socket_x_coordinate=/jointset/knee_l/knee_angle_l
          socket_y_coordinate=/jointset/knee_l/knee_angle_l socket_z_coordinate=/jointset/knee_l/knee_angle_l
        x_location: MultiplierFunction: scale=1
          SimmSpline: x=(-2.0944 -1.99997 -1.5708 -1.45752 -1.39626 -1.0472 -0.698132 -0.526391 -0.349066 -0.174533 0 0.00017453 0.00034907 0.0279253 0.0872665 0.174533 2.0944)
              y=(0.0082733 0.0106866 0.0202042 0.022353 0.0234583 0.0292715 0.0349465 0.037871 0.0412569 0.0465287 0.0554632 0.0554735 0.0554837 0.0571717 0.061272 0.0684368 0.0648818)
        y_location: MultiplierFunction: scale=0.8851444
          SimmSpline: x=(-2.0944 -1.99997 -1.5708 -1.45752 -1.39626 -1.0472 -0.698132 -0.526391 -0.349066 -0.174533 0 0.00017453 0.00034907 0.0279253 0.0872665 0.174533 2.0944)
              y=(0.025599 0.0259487 0.0273124 0.0274796 0.0275151 0.0271363 0.0265737 0.0263073 0.0261187 0.0260129 0.0252923 0.0252911 0.0252898 0.0250526 0.0242191 0.0218288 -0.0685706)
        z_location: MultiplierFunction: scale=0.9952438
          SimmSpline: x=(-2.0944 2.0944) y=(-0.0018 -0.0018)
    DeGrooteFregly2016Muscle med_gas_l: max_isometric_force=2500 optimal_fiber_length=0.08008829
        tendon_slack_length=0.3203531 pennation_angle_at_optimal=0.296706
      PathPoint P1: femur_l (-0.019 -0.4409157 0.01862245)
      ConditionalPathPoint P2: femur_l (-0.03 -0.4513522 0.02044507) socket_coordinate=/jointset/knee_l/knee_angle_l
          range=(-0.785398 0.174533)
      PathPoint P3: calcn_l (0 0.031 0.005274792)
    DeGrooteFregly2016Muscle soleus_l: max_isometric_force=4000 optimal_fiber_length=0.04462536
        tendon_slack_length=0.2231268 pennation_angle_at_optimal=0.4363323
      PathPoint P1: tibia_l (-0.0024 -0.1356926 -0.007066231)
      PathPoint P2: calcn_l (0 0.031 0.005274792)
    DeGrooteFregly2016Muscle tib_post_l: max_isometric_force=3600 optimal_fiber_length=0.02787629
        tendon_slack_length=0.2787629 pennation_angle_at_optimal=0.2094395
      PathPoint P1: tibia_l (-0.0094 -0.1193175 -0.001890963)
      PathPoint P2: tibia_l (-0.0144 -0.358572 0.02279108)
      PathPoint P3: calcn_l (0.0405556 0.0334 0.02846397)
      PathPoint P4: calcn_l (0.07508135 0.0159 0.02796635)
    DeGrooteFregly2016Muscle tib_ant_l: max_isometric_force=3000 optimal_fiber_length=0.08783277
        tendon_slack_length=0.1998644 pennation_angle_at_optimal=0.08726646
      PathPoint P1: tibia_l (0.0179 -0.1437475 -0.0114453)
      PathPoint P2: tibia_l (0.0329 -0.3497206 0.01761582)
      PathPoint P3: calcn_l (0.1134001 0.0178 0.03035494)
    DeGrooteFregly2016Muscle ercspn_r: max_isometric_force=2500 optimal_fiber_length=0.1113056
        tendon_slack_length=0.02782639 pennation_angle_at_optimal=0
      PathPoint P1: pelvis (-0.1643699 0.04737371 0.04267012)
      PathPoint P2: torso (-0.0623625 0.09597866 0.02337429)
    DeGrooteFregly2016Muscle ercspn_l: max_isometric_force=2500 optimal_fiber_length=0.1113056
        tendon_slack_length=0.02782639 pennation_angle_at_optimal=0
      PathPoint P1: pelvis (-0.1643699 0.04737371 -0.04267012)
      PathPoint P2: torso (-0.0623625 0.09597866 -0.02337429)
    DeGrooteFregly2016Muscle intobl_r: max_isometric_force=900 optimal_fiber_length=0.09112139
        tendon_slack_length=0.09112139 pennation_angle_at_optimal=0
      PathPoint P1: pelvis (-0.04696284 0.07553894 0.1132324)
      PathPoint P2: torso (0.07937046 0.1396053 0.01454831)
    DeGrooteFregly2016Muscle intobl_l: max_isometric_force=900 optimal_fiber_length=0.09112139
        tendon_slack_length=0.09112139 pennation_angle_at_optimal=0
      PathPoint P1: pelvis (-0.04696284 0.07553894 -0.1132324)
      PathPoint P2: torso (0.07937046 0.1396053 -0.01454831)
    DeGrooteFregly2016Muscle extobl_r: max_isometric_force=900 optimal_fiber_length=0.1185165
        tendon_slack_length=0.1382693 pennation_angle_at_optimal=0
      PathPoint P1: pelvis (-0.03522213 -0.06863252 0.009786725)
      PathPoint P2: torso (0.07370114 0.09597866 0.1066876)
    DeGrooteFregly2016Muscle extobl_l: max_isometric_force=900 optimal_fiber_length=0.1185165
        tendon_slack_length=0.1382693 pennation_angle_at_optimal=0
      PathPoint P1: pelvis (-0.03522213 -0.06863252 -0.009786725)
      PathPoint P2: torso (0.07370114 0.09597866 -0.1066876)
    CoordinateActuator reserve_jointset_ground_pelvis_pelvis_tilt: coordinate=pelvis_tilt optimal_force=250
    CoordinateActuator reserve_jointset_ground_pelvis_pelvis_list: coordinate=pelvis_list optimal_force=250
    CoordinateActuator reserve_jointset_ground_pelvis_pelvis_rotation: coordinate=pelvis_rotation optimal_force=250
    CoordinateActuator reserve_jointset_ground_pelvis_pelvis_tx: coordinate=pelvis_tx optimal_force=250
    CoordinateActuator reserve_jointset_ground_pelvis_pelvis_ty: coordinate=pelvis_ty optimal_force=250
    CoordinateActuator reserve_jointset_ground_pelvis_pelvis_tz: coordinate=pelvis_tz optimal_force=250
    CoordinateActuator reserve_jointset_hip_r_hip_flexion_r: coordinate=hip_flexion_r optimal_force=250
    CoordinateActuator reserve_jointset_hip_r_hip_adduction_r: coordinate=hip_adduction_r optimal_force=250
    CoordinateActuator reserve_jointset_hip_r_hip_rotation_r: coordinate=hip_rotation_r optimal_force=250
    CoordinateActuator reserve_jointset_knee_r_knee_angle_r: coordinate=knee_angle_r optimal_force=250
    CoordinateActuator reserve_jointset_ankle_r_ankle_angle_r: coordinate=ankle_angle_r optimal_force=250
    CoordinateActuator reserve_jointset_subtalar_r_subtalar_angle_r: coordinate=subtalar_angle_r optimal_force=250
    CoordinateActuator reserve_jointset_mtp_r_mtp_angle_r: coordinate=mtp_angle_r optimal_force=250
    CoordinateActuator reserve_jointset_hip_l_hip_flexion_l: coordinate=hip_flexion_l optimal_force=250
    CoordinateActuator reserve_jointset_hip_l_hip_adduction_l: coordinate=hip_adduction_l optimal_force=250
    CoordinateActuator reserve_jointset_hip_l_hip_rotation_l: coordinate=hip_rotation_l optimal_force=250
    CoordinateActuator reserve_jointset_knee_l_knee_angle_l: coordinate=knee_angle_l optimal_force=250
    CoordinateActuator reserve_jointset_ankle_l_ankle_angle_l: coordinate=ankle_angle_l optimal_force=250
    CoordinateActuator reserve_jointset_subtalar_l_subtalar_angle_l: coordinate=subtalar_angle_l optimal_force=250
    CoordinateActuator reserve_jointset_mtp_l_mtp_angle_l: coordinate=mtp_angle_l optimal_force=250
    CoordinateActuator reserve_jointset_back_lumbar_extension: coordinate=lumbar_extension optimal_force=250
    CoordinateActuator reserve_jointset_back_lumbar_bending: coordinate=lumbar_bending optimal_force=250
    CoordinateActuator reserve_jointset_back_lumbar_rotation: coordinate=lumbar_rotation optimal_force=250
    ObjectGroup R_hip_abd
    ObjectGroup R_hip_flex
    ObjectGroup R_hip_inrot
    ObjectGroup R_hip_exrot
    ObjectGroup R_hip_ext
    ObjectGroup R_hip_add
    ObjectGroup R_knee_bend
    ObjectGroup R_knee_ext
    ObjectGroup R_ankle_pf
    ObjectGroup R_inverter
    ObjectGroup R_ankle_df
    ObjectGroup L_hip_abd
    ObjectGroup L_hip_flex
    ObjectGroup L_hip_inrot
    ObjectGroup L_hip_exrot
    ObjectGroup L_hip_ext
    ObjectGroup L_hip_add
    ObjectGroup L_knee_bend
    ObjectGroup L_knee_ext
    ObjectGroup L_ankle_pf
    ObjectGroup L_inverter
    ObjectGroup L_ankle_df
    ObjectGroup back_ext
    ObjectGroup back_rlb
    ObjectGroup back_introt
    ObjectGroup back_llb
    ObjectGroup back_extrot
    ObjectGroup back_flex
  MarkerSet:
    Marker APEX: torso (-0.009490989 0.527129 0.001141539)
    Marker LASI: pelvis (0.02918876 -0.0390007 -0.1347554)
    Marker RASI: pelvis (0.02089048 -0.03320858 0.1286193)
    Marker LPSI: pelvis (-0.1803581 -0.004734481 -0.03668136)
    Marker RPSI: pelvis (-0.1774568 -0.002644227 0.04247277)
    Marker LGTR: pelvis (-0.1070382 -0.09611816 -0.180092)
    Marker LLEP: femur_l (0.013841 -0.4415468 -0.05421124)
    Marker LMEP: femur_l (0.008599052 -0.4486651 0.04169416)
    Marker LTTB: tibia_l (0.03828549 -0.04385854 -0.006523715)
    Marker LFBH: tibia_l (-0.001921339 -0.03462009 -0.06476722)
    Marker LLML: tibia_l (-0.009364311 -0.351822 -0.04084933)
    Marker LMML: tibia_l (0.01954123 -0.34021 0.03415366)
    Marker L2MT: toes_l (0.01786666 0.01666263 -0.002872666)
    Marker L1MT: calcn_l (0.1800363 0.008676525 0.03586805)
    Marker L5MT: calcn_l (0.1509412 0.005161212 -0.06090171)
    Marker LCAL: calcn_l (-0.01358027 0.04503308 0.007023752)
    Marker RGTR: pelvis (-0.1098463 -0.08691686 0.1824484)
    Marker RLEP: femur_r (0.01067325 -0.4469954 0.0473798)
    Marker RMEP: femur_r (0.0002936499 -0.4685232 -0.03752345)
    Marker RTTB: tibia_r (0.03503586 -0.04122907 0.006329771)
    Marker RFBH: tibia_r (-0.006589536 -0.03216769 0.06012767)
    Marker RLML: tibia_r (-0.004549128 -0.349936 0.04143293)
    Marker RMML: tibia_r (0.02322099 -0.3461994 -0.03161214)
    Marker R2MT: toes_r (0.02429996 0.01639975 0.005451189)
    Marker R1MT: calcn_r (0.1843565 0.01228119 -0.03678715)
    Marker R5MT: calcn_r (0.1567164 -0.006679625 0.06022482)
    Marker RCAL: calcn_r (-0.004283171 0.0391619 -0.004049725)
    Marker RTH1: femur_r (0.08970058 -0.1486304 0.09436314)
    Marker RTH2: femur_r (0.08422406 -0.2512937 0.07669435)
    Marker RTH3: femur_r (0.02999294 -0.2516485 0.09884783)
    Marker LTH1: femur_l (-0.002812732 -0.1919566 -0.114173)
    Marker LTH3: femur_l (0.0576223 -0.2937628 -0.09810664)
    Marker LTH2: femur_l (-0.001625443 -0.2935361 -0.092874)
    Marker RSH1: tibia_r (0.004685365 -0.07587537 0.07666818)
    Marker RSH2: tibia_r (0.01372846 -0.1790084 0.07380988)
    Marker RSH3: tibia_r (-0.04479482 -0.1850593 0.07891351)
