# OpenSim document version 40000
InverseKinematicsTool:
  results_directory: ./
  constraint_weight: Inf
  accuracy: 1e-5
  time_range: 20 65
  output_motion_file: C:\Users\Owen\Repositories\CapacitiveSensingKinematics\CSOptimalControl\OutputData\IKoutput_20to65secs.mot
  report_errors: false
  marker_file: C:\Users\Owen\Repositories\CapacitiveSensingKinematics\CSOptimalControl\OutputData\OpenSim_Sub02_CSBaseline_markers.trc
  report_marker_locations: false
  IKTaskSet gait2354_Scale:
    IKMarkerTask APEX: apply=true weight=1000
    IKMarkerTask LASI: apply=true weight=3000
    IKMarkerTask RASI: apply=true weight=3000
    IKMarkerTask LPS1: apply=true weight=100
    IKMarkerTask LPS2: apply=true weight=100
    IKMarkerTask RPS1: apply=true weight=100
    IKMarkerTask RPS2: apply=true weight=100
    IKMarkerTask LGTR: apply=true weight=1
    IKMarkerTask LLEP: apply=true weight=1000
    IKMarkerTask LMEP: apply=true weight=1000
    IKMarkerTask LTTB: apply=true weight=1
    IKMarkerTask LFBH: apply=true weight=1
    IKMarkerTask LLML: apply=true weight=1
    IKMarkerTask LMML: apply=true weight=1
    IKMarkerTask L2MT: apply=true weight=2000
    IKMarkerTask L1MT: apply=true weight=10
    IKMarkerTask L5MT: apply=true weight=10
    IKMarkerTask LCAL: apply=true weight=3300
    IKMarkerTask RGTR: apply=true weight=1
    IKMarkerTask RLEP: apply=true weight=1000
    IKMarkerTask RMEP: apply=true weight=1000
    IKMarkerTask RTTB: apply=true weight=1
    IKMarkerTask RFBH: apply=true weight=1
    IKMarkerTask RLML: apply=true weight=1
    IKMarkerTask RMML: apply=true weight=1
    IKMarkerTask R2MT: apply=true weight=1000
    IKMarkerTask R1MT: apply=true weight=10
    IKMarkerTask R5MT: apply=true weight=10
    IKMarkerTask RCAL: apply=true weight=2100
    IKMarkerTask RTH1: apply=true weight=1
    IKMarkerTask RTH2: apply=true weight=1
    IKMarkerTask RTH3: apply=true weight=1
    IKMarkerTask LTH1: apply=true weight=1
    IKMarkerTask LTH2: apply=true weight=1
    IKMarkerTask LTH3: apply=true weight=1
    IKMarkerTask RSH1: apply=true weight=1
    IKMarkerTask RSH2: apply=true weight=1
    IKMarkerTask RSH3: apply=true weight=1
    IKMarkerTask LSH1: apply=true weight=1
    IKMarkerTask LSH2: apply=true weight=1
    IKMarkerTask LSH3: apply=true weight=1
