# OpenSim document version 40000
MocoStudy MocoTrackSolution:
  write_solution: true
  results_directory: C:\Users\Owen\Repositories\CapacitiveSensingKinematics\CSOptimalControl\OutputData
  MocoProblem problem:
    MocoPhase phases:
      ModelProcessor model:
        model: Model subject01:
          assembly_accuracy: 1e-7
          gravity: 0 -9.80665 0
          length_units: meters
          force_units: N
          credits:
            Arnold, E.M., Hamner, S.R., Ward, S.R., Lieber, R. L., and Delp, S.L.
          Ground
          BodySet:
            Body pelvis: mass=17.57493 [kg] mass_center=(-0.0675842 0 0)
                inertia=(0.08191144 0.08191144 0.03369269 0 0 0) meshes=(r_pelvis.vtp l_pelvis.vtp sacrum.vtp)
              PhysicalOffsetFrame pelvis_imu_offset: socket_parent=..
                  translation=(-0.1650559 0.01908316 0.001981964) [meters] orientation=(-1.58359 -1.57079 0) [radians]
              WrapCylinder Gmax1_at_pelvis_r: xyz_body_rotation=(-0.6 0.45 0)
                  translation=(-0.07360656 -0.08804772 0.06920766) quadrant=-x radius=0.03917543 length=0.1566455
              WrapCylinder Gmax2_at_pelvis_r: xyz_body_rotation=(-0.75 0.39 0)
                  translation=(-0.07647435 -0.07381777 0.07714951) quadrant=all radius=0.03967789 length=0.1017839
              WrapCylinder Gmax3_at_pelvis_r: xyz_body_rotation=(-0.1 0 0)
                  translation=(-0.07934176 -0.07826459 0.07714951) quadrant=all radius=0.03724641 length=0.1132164
              WrapCylinder Gmax1_at_pelvis_l: xyz_body_rotation=(0.6 -0.45 0)
                  translation=(-0.07360656 -0.08804772 -0.06920766) quadrant=-x radius=0.03917543 length=0.1566455
              WrapCylinder Gmax2_at_pelvis_l: xyz_body_rotation=(0.75 -0.39 0)
                  translation=(-0.07647435 -0.07381777 -0.07714951) quadrant=all radius=0.03967789 length=0.1017839
              WrapCylinder Gmax3_at_pelvis_l: xyz_body_rotation=(0.1 0 0)
                  translation=(-0.07934176 -0.07826459 -0.07714951) quadrant=all radius=0.03724641 length=0.1132164
              WrapCylinder PS_at_brim_r: xyz_body_rotation=(-0.25 -0.27 0.1)
                  translation=(-0.07073877 -0.0533622 0.07442655) quadrant=-y radius=0.0471992 length=0.1110286
              WrapCylinder PS_at_brim_l: xyz_body_rotation=(0.25 0.27 0.1)
                  translation=(-0.07073877 -0.0533622 -0.07442655) quadrant=-y radius=0.0471992 length=0.1110286
              WrapCylinder IL_at_brim_r: xyz_body_rotation=(-0.32 -0.24 0.9)
                  translation=(-0.06787098 -0.05780911 0.08577207) quadrant=-y radius=0.05230865 length=0.1103775
              WrapCylinder IL_at_brim_l: xyz_body_rotation=(0.32 0.24 0.9)
                  translation=(-0.06787098 -0.05780911 -0.08577207) quadrant=-y radius=0.05230865 length=0.1103775
            Body femur_r: mass=6.365217 mass_center=(0 -0.1603407 0) inertia=(0.08200325 0.02231764 0.08200325 0 0 0)
                meshes=r_femur.vtp
              PhysicalOffsetFrame femur_r_imu_offset: socket_parent=.. translation=(0.01995084 -0.1206796 0.1040358)
                  orientation=(0 0 -1.5708)
              WrapCylinder Gastroc_at_condyles_r: translation=(0.004958001 -0.386704 0) quadrant=all radius=0.02418476
                  length=0.09368196
              WrapCylinder KnExt_at_fem_r: xyz_body_rotation=(-0.0623366 0.0507601 0)
                  translation=(0.003558137 -0.3798487 0.00195899) quadrant=all radius=0.02418274 length=0.09369894
              WrapCylinder AB_at_femshaft_r: xyz_body_rotation=(1.66157 0.186644 0)
                  translation=(0.01452042 -0.1061974 0.02188882) quadrant=all radius=0.01589645 length=0.06613872
              WrapCylinder AL_at_femshaft_r: xyz_body_rotation=(1.77711 0.136489 0)
                  translation=(0.03047452 -0.2187322 0.01415879) quadrant=all radius=0.01937447 length=0.09438386
              WrapCylinder AMprox_at_femshaft_r: xyz_body_rotation=(1.61126 0.18656 0)
                  translation=(0.005139449 -0.06875294 0.02379805) quadrant=all radius=0.02032778 length=0.06614143
              WrapCylinder AMmid_at_femshaft_r: xyz_body_rotation=(1.61139 0.13656 0)
                  translation=(0.02281922 -0.1515793 0.01928372) quadrant=all radius=0.02062483 length=0.1132908
              WrapCylinder AMdist_at_femshaft_r: xyz_body_rotation=(1.71188 0.186636 0)
                  translation=(0.03134098 -0.245921 0.008772944) quadrant=all radius=0.02100336 length=0.1889536
              WrapCylinder AMisch_at_condyles_r: xyz_body_rotation=(1.71115 -0.463363 0)
                  translation=(-0.02246088 -0.3554196 -0.002955079) quadrant=all radius=0.03838078 length=0.2287084
              WrapCylinder PECT_at_femshaft_r: xyz_body_rotation=(1.81295 0.276344 0)
                  translation=(0.006034611 -0.07970151 0.02851726) quadrant=all radius=0.01443929 length=0.04732671
            Body tibia_r: mass=2.537149 mass_center=(0 -0.2176077 0) inertia=(0.04664116 0.004296244 0.04664116 0 0 0)
                meshes=(r_tibia.vtp r_fibula.vtp)
              PhysicalOffsetFrame tibia_r_imu_offset: socket_parent=.. translation=(-0.00187783 -0.1800181 0.05971712)
                  orientation=(0 0 -1.5708)
              WrapCylinder GasLat_at_shank_r: xyz_body_rotation=(2.96723 -0.279725 -1.47812)
                  translation=(-0.00756878 -0.08625064 -0.003970907) quadrant=-y radius=0.06062005 length=0.1189466
              WrapCylinder GasMed_at_shank_r: xyz_body_rotation=(2.96723 0.0279725 -1.47812)
                  translation=(-0.00756878 -0.08625064 -0.003970907) quadrant=-y radius=0.06022032 length=0.1202056
              WrapCylinder GR_at_condyles_r: xyz_body_rotation=(0 -0.4 0) translation=(-0.003068424 -0.02331099 0)
                  quadrant=all radius=0.03991901 length=0.1177714
              WrapCylinder SM_at_condyles_r: xyz_body_rotation=(0 -0.1 0) translation=(-0.001022808 -0.02331099 0)
                  quadrant=all radius=0.03854951 length=0.120164
              WrapCylinder ST_at_condyles_r: xyz_body_rotation=(0 -0.2 0) translation=(-0.002045616 -0.02389376 0)
                  quadrant=all radius=0.04666672 length=0.1196697
              WrapCylinder BF_at_gastroc_r: translation=(-0.05932287 -0.06993296 0) quadrant=y radius=0.03282536
                  length=0.1804958
            Body patella_r: mass=0.05898915 mass_center=(0.0017244 0.0252912 0)
                inertia=(1.802857e-6 8.23535e-6 8.23535e-6 0 0 0) meshes=r_patella.vtp
            Body talus_r: mass=0.06843289 mass_center=(0 0 0) inertia=(0.00170228 0.001298369 0.001298369 0 0 0)
                meshes=r_talus.vtp
            Body calcn_r: mass=0.8554111 mass_center=(0.1032243 0.04435088 0)
                inertia=(0.002221715 0.003444633 0.003444633 0 0 0) meshes=r_foot.vtp
            Body toes_r: mass=0.1482256 mass_center=(0.03571547 0.008870186 -0.02744531)
                inertia=(0.0001586942 0.0001887428 0.0001887428 0 0 0) meshes=r_bofoot.vtp
              PhysicalOffsetFrame toes_r_imu_offset: socket_parent=.. translation=(-0.03850846 0.04727412 0.01574162)
                  orientation=(-1.308 0.4 -0.2)
            Body femur_l: mass=6.365217 mass_center=(0 -0.1603407 0) inertia=(0.08200325 0.02231764 0.08200325 0 0 0)
                meshes=l_femur.vtp
              PhysicalOffsetFrame femur_l_imu_offset: socket_parent=.. translation=(0.0208937 -0.1325632 -0.09523668)
                  orientation=(0 -3.14159 -1.57079)
              WrapCylinder Gastroc_at_condyles_l: translation=(0.004958001 -0.386704 0) quadrant=all radius=0.02418476
                  length=0.09368196
              WrapCylinder KnExt_at_fem_l: xyz_body_rotation=(0.0623366 -0.0507601 0)
                  translation=(0.003558137 -0.3798487 -0.00195899) quadrant=all radius=0.02418274 length=0.09369894
              WrapCylinder AB_at_femshaft_l: xyz_body_rotation=(-1.66157 -0.186644 0)
                  translation=(0.01452042 -0.1061974 -0.02188882) quadrant=all radius=0.01589645 length=0.06613872
              WrapCylinder AL_at_femshaft_l: xyz_body_rotation=(-1.77711 -0.136489 0)
                  translation=(0.03047452 -0.2187322 -0.01415879) quadrant=all radius=0.01937447 length=0.09438386
              WrapCylinder AMprox_at_femshaft_l: xyz_body_rotation=(-1.61126 -0.18656 0)
                  translation=(0.005139449 -0.06875294 -0.02379805) quadrant=all radius=0.02032778 length=0.06614143
              WrapCylinder AMmid_at_femshaft_l: xyz_body_rotation=(-1.61139 -0.13656 0)
                  translation=(0.02281922 -0.1515793 -0.01928372) quadrant=all radius=0.02062483 length=0.1132908
              WrapCylinder AMdist_at_femshaft_l: xyz_body_rotation=(-1.71188 -0.186636 0)
                  translation=(0.03134098 -0.245921 -0.008772944) quadrant=all radius=0.02100336 length=0.1889536
              WrapCylinder AMisch_at_condyles_l: xyz_body_rotation=(-1.71115 0.463363 0)
                  translation=(-0.02246088 -0.3554196 0.002955079) quadrant=all radius=0.03838078 length=0.2287084
              WrapCylinder PECT_at_femshaft_l: xyz_body_rotation=(-1.81295 -0.276344 0)
                  translation=(0.006034611 -0.07970151 -0.02851726) quadrant=all radius=0.01443929 length=0.04732671
            Body tibia_l: mass=2.537149 mass_center=(0 -0.2176077 0) inertia=(0.04664116 0.004296244 0.04664116 0 0 0)
                meshes=(l_tibia.vtp l_fibula.vtp)
              PhysicalOffsetFrame tibia_l_imu_offset: socket_parent=.. translation=(0.007800953 -0.1709298 -0.05841981)
                  orientation=(0 -3.14159 -1.57079)
              WrapCylinder GasLat_at_shank_l: xyz_body_rotation=(-2.96723 0.279725 -1.47812)
                  translation=(-0.00756878 -0.08625064 0.003970907) quadrant=-y radius=0.06062005 length=0.1189466
              WrapCylinder GasMed_at_shank_l: xyz_body_rotation=(-2.96723 -0.0279725 -1.47812)
                  translation=(-0.00756878 -0.08625064 0.003970907) quadrant=-y radius=0.06022032 length=0.1202056
              WrapCylinder GR_at_condyles_l: xyz_body_rotation=(0 0.4 0) translation=(-0.003068424 -0.02331099 0)
                  quadrant=all radius=0.03991901 length=0.1177714
              WrapCylinder SM_at_condyles_l: xyz_body_rotation=(0 0.1 0) translation=(-0.001022808 -0.02331099 0)
                  quadrant=all radius=0.03854951 length=0.120164
              WrapCylinder ST_at_condyles_l: xyz_body_rotation=(0 0.2 0) translation=(-0.002045616 -0.02389376 0)
                  quadrant=all radius=0.04666672 length=0.1196697
              WrapCylinder BF_at_gastroc_l: translation=(-0.05932287 -0.06993296 0) quadrant=all radius=0.03282536
                  length=0.1804958
            Body patella_l: mass=0.05898915 mass_center=(0.0017244 0.0252912 0)
                inertia=(1.802857e-6 8.23535e-6 8.23535e-6 0 0 0) meshes=l_pat.vtp
            Body talus_l: mass=0.06843289 mass_center=(0 0 0) inertia=(0.00170228 0.001298369 0.001298369 0 0 0)
                meshes=l_talus.vtp
            Body calcn_l: mass=0.8554111 mass_center=(0.1032243 0.04435088 0)
                inertia=(0.002221715 0.003444633 0.003444633 0 0 0) meshes=l_foot.vtp
            Body toes_l: mass=0.1482256 mass_center=(0.03571547 0.008870186 0.02744531)
                inertia=(0.0001586942 0.0001887428 0.0001887428 0 0 0) meshes=l_bofoot.vtp
              PhysicalOffsetFrame toes_l_imu_offset: socket_parent=.. translation=(-0.04130984 0.04562846 -0.01785992)
                  orientation=(-1.908 0.4 0.3)
            Body torso: mass=18.35822 mass_center=(-0.01142605 0.2985258 -0.002178594)
                inertia=(0.9312726 0.5559232 0.9312726 0 0 0)
                meshes=(hat_spine.vtp hat_jaw.vtp hat_skull.vtp hat_ribs_scap.vtp)
              PhysicalOffsetFrame torso_imu_offset: socket_parent=.. translation=(0.03884616 0.3405849 0)
                  orientation=(0 1.5708 0)
          JointSet:
            CustomJoint ground_pelvis: socket_parent_frame=ground_offset socket_child_frame=pelvis_offset
              Coordinate pelvis_tilt: default_value=0 range=(-0.2 0.2) clamped=true
              Coordinate pelvis_list: default_value=0 range=(-0.2 0.2) clamped=true
              Coordinate pelvis_rotation: default_value=0 range=(-0.5 0.5) clamped=true
              Coordinate pelvis_tx: default_value=0 range=(-10 100) clamped=true
              Coordinate pelvis_ty: default_value=0.93 range=(0.8 1.2) clamped=true
              Coordinate pelvis_tz: default_value=0 range=(-3 3) clamped=true
              PhysicalOffsetFrame ground_offset: socket_parent=/ground translation=(0 0 0)
              PhysicalOffsetFrame pelvis_offset: socket_parent=/bodyset/pelvis translation=(0 0 0)
              SpatialTransform:
                TransformAxis rotation1: coordinates=pelvis_tilt axis=(0 0 1) LinearFunction(coefficients=1 0)
                TransformAxis rotation2: coordinates=pelvis_list axis=(1 0 0) LinearFunction(coefficients=1 0)
                TransformAxis rotation3: coordinates=pelvis_rotation axis=(0 1 0) LinearFunction(coefficients=1 0)
                TransformAxis translation1: coordinates=pelvis_tx axis=(1 0 0) LinearFunction(coefficients=1 0)
                TransformAxis translation2: coordinates=pelvis_ty axis=(0 1 0) LinearFunction(coefficients=1 0)
                TransformAxis translation3: coordinates=pelvis_tz axis=(0 0 1) LinearFunction(coefficients=1 0)
            CustomJoint hip_r: socket_parent_frame=pelvis_offset socket_child_frame=femur_r_offset
              Coordinate hip_flexion_r: default_value=0 range=(-0.3 1) clamped=true
              Coordinate hip_adduction_r: default_value=0 range=(-0.3 0.2) clamped=true
              Coordinate hip_rotation_r: default_value=0 range=(-0.3 0.1) clamped=true
              PhysicalOffsetFrame pelvis_offset: socket_parent=/bodyset/pelvis
                  translation=(-0.05379585 -0.06980673 0.08765541)
              PhysicalOffsetFrame femur_r_offset: socket_parent=/bodyset/femur_r translation=(0 0 0)
              SpatialTransform: axes_held_at_zero=(translation1 translation2 translation3)
                TransformAxis rotation1: coordinates=hip_flexion_r axis=(0 0 1) LinearFunction(coefficients=1 0)
                TransformAxis rotation2: coordinates=hip_adduction_r axis=(1 0 0) LinearFunction(coefficients=1 0)
                TransformAxis rotation3: coordinates=hip_rotation_r axis=(0 1 0) LinearFunction(coefficients=1 0)
            CustomJoint walker_knee_r: socket_parent_frame=femur_r_offset socket_child_frame=tibia_r_offset
              Coordinate knee_angle_r: default_value=0 range=(0 1.5) clamped=true
              PhysicalOffsetFrame femur_r_offset: socket_parent=/bodyset/femur_r
                  translation=(-0.008022045 -0.3847802 -0.002576254) orientation=(-1.64157 1.44618 1.5708)
              PhysicalOffsetFrame tibia_r_offset: socket_parent=/bodyset/tibia_r
                  translation=(-0.008274046 -0.004119988 -0.001786599) orientation=(-1.64157 1.44618 1.5708)
              SpatialTransform: axes_held_at_zero=translation3
                TransformAxis rotation1: coordinates=knee_angle_r axis=(1 0 0) LinearFunction(coefficients=1 0)
                TransformAxis rotation2: coordinates=knee_angle_r axis=(0 0 1)
                  SimmSpline: x=(0 0.174533 0.349066 0.523599 0.698132 0.872665 1.0472 1.22173 1.39626 1.5708 1.74533 1.91986 2.0944)
                      y=(0 0.0126809 0.0226969 0.0296054 0.0332049 0.0335354 0.0308779 0.0257548 0.0189295 0.011407 0.00443314 -0.00050475 -0.0016782)
                TransformAxis rotation3: coordinates=knee_angle_r axis=(0 1 0)
                  SimmSpline: x=(0 0.174533 0.349066 0.523599 0.698132 0.872665 1.0472 1.22173 1.39626 1.5708 1.74533 1.91986 2.0944)
                      y=(0 0.059461 0.109399 0.150618 0.18392 0.210107 0.229983 0.24435 0.254012 0.25977 0.262428 0.262788 0.261654)
                TransformAxis translation1: coordinates=knee_angle_r axis=(0 1 0)
                  MultiplierFunction: scale=0.9431805
                    SimmSpline: x=(0 0.174533 0.349066 0.523599 0.698132 0.872665 1.0472 1.22173 1.39626 1.5708 1.74533 1.91986 2.0944)
                        y=(0 0.000479 0.000835 0.001086 0.001251 0.001346 0.001391 0.001403 0.0014 0.0014 0.001421 0.001481 0.001599)
                TransformAxis translation2: coordinates=knee_angle_r axis=(0 0 1)
                  MultiplierFunction: scale=0.9368196
                    SimmSpline: x=(0 0.174533 0.349066 0.523599 0.698132 0.872665 1.0472 1.22173 1.39626 1.5708 1.74533 1.91986 2.0944)
                        y=(0 0.000988 0.001899 0.002734 0.003492 0.004173 0.004777 0.005305 0.005756 0.00613 0.006427 0.006648 0.006792)
            CustomJoint patellofemoral_r: socket_parent_frame=femur_r_offset socket_child_frame=patella_r_offset
              Coordinate knee_angle_r_beta: default_value=0 range=(-1 2) clamped=false
              PhysicalOffsetFrame femur_r_offset: socket_parent=/bodyset/femur_r
                  translation=(-0.008022045 -0.3847802 -0.002576254)
              PhysicalOffsetFrame patella_r_offset: socket_parent=/bodyset/patella_r translation=(0 0 0)
              SpatialTransform: axes_held_at_zero=(rotation2 rotation3)
                TransformAxis rotation1: coordinates=knee_angle_r_beta axis=(0 0 1)
                  SimmSpline: x=(0 0.174533 0.349066 0.523599 0.698132 0.872665 1.0472 1.22173 1.39626 1.5708 1.74533 1.91986 2.0944)
                      y=(0.00113686 -0.00629212 -0.105582 -0.253683 -0.414245 -0.579047 -0.747244 -0.91799 -1.09044 -1.26379 -1.43763 -1.61186 -1.78634)
                TransformAxis translation1: coordinates=knee_angle_r_beta axis=(1 0 0)
                  MultiplierFunction: scale=0.9916001
                    SimmSpline f9: x=(0 0.174533 0.349066 0.523599 0.698132 0.872665 1.0472 1.22173 1.39626 1.5708 1.74533 1.91986 2.0944)
                        y=(0.0524 0.0488 0.0437 0.0371 0.0296 0.0216 0.0136 0.0057 -0.0019 -0.0088 -0.0148 -0.0196 -0.0227)
                TransformAxis translation2: coordinates=knee_angle_r_beta axis=(0 1 0)
                  MultiplierFunction: scale=0.9431805
                    SimmSpline f10: x=(0 0.174533 0.349066 0.523599 0.698132 0.872665 1.0472 1.22173 1.39626 1.5708 1.74533 1.91986 2.0944)
                        y=(-0.0108 -0.019 -0.0263 -0.0322 -0.0367 -0.0395 -0.0408 -0.0404 -0.0384 -0.0349 -0.0301 -0.0245 -0.0187)
                TransformAxis translation3: axis=(0 0 1) MultiplierFunction(scale=0.9368196, Constant(value=0.00275))
            PinJoint ankle_r: socket_parent_frame=tibia_r_offset socket_child_frame=talus_r_offset
              Coordinate ankle_angle_r: default_value=0 range=(-1 1) clamped=true
              PhysicalOffsetFrame tibia_r_offset: socket_parent=/bodyset/tibia_r translation=(-0.01022808 -0.4662197 0)
                  orientation=(0.175895 -0.105208 0.0186622)
              PhysicalOffsetFrame talus_r_offset: socket_parent=/bodyset/talus_r translation=(0 0 0)
                  orientation=(0.175895 -0.105208 0.0186622)
            CustomJoint hip_l: socket_parent_frame=pelvis_offset socket_child_frame=femur_l_offset
              Coordinate hip_flexion_l: default_value=0 range=(-0.5235988 2.094395) clamped=true
              Coordinate hip_adduction_l: default_value=0 range=(-0.8726646 0.5235988) clamped=true
              Coordinate hip_rotation_l: default_value=0 range=(-0.6981317 0.6981317) clamped=true
              PhysicalOffsetFrame pelvis_offset: socket_parent=/bodyset/pelvis
                  translation=(-0.05379585 -0.06980673 -0.08765541)
              PhysicalOffsetFrame femur_l_offset: socket_parent=/bodyset/femur_l translation=(0 0 0)
              SpatialTransform: axes_held_at_zero=(translation1 translation2 translation3)
                TransformAxis rotation1: coordinates=hip_flexion_l axis=(0 0 1) LinearFunction(coefficients=1 0)
                TransformAxis rotation2: coordinates=hip_adduction_l axis=(1 0 0) LinearFunction(coefficients=-1 0)
                TransformAxis rotation3: coordinates=hip_rotation_l axis=(0 1 0) LinearFunction(coefficients=-1 0)
            CustomJoint walker_knee_l: socket_parent_frame=femur_l_offset socket_child_frame=tibia_l_offset
              Coordinate knee_angle_l: default_value=0 range=(0 2.0944) clamped=true
              PhysicalOffsetFrame femur_l_offset: socket_parent=/bodyset/femur_l
                  translation=(-0.008022045 -0.3847802 0.002576254) orientation=(1.64157 -1.44618 1.5708)
              PhysicalOffsetFrame tibia_l_offset: socket_parent=/bodyset/tibia_l
                  translation=(-0.008274046 -0.004119988 0.001786599) orientation=(1.64157 -1.44618 1.5708)
              SpatialTransform: axes_held_at_zero=translation3
                TransformAxis rotation1: coordinates=knee_angle_l axis=(-1 0 0) LinearFunction(coefficients=1 0)
                TransformAxis rotation2: coordinates=knee_angle_l axis=(0 0 1)
                  SimmSpline: x=(0 0.174533 0.349066 0.523599 0.698132 0.872665 1.0472 1.22173 1.39626 1.5708 1.74533 1.91986 2.0944)
                      y=(0 0.0126809 0.0226969 0.0296054 0.0332049 0.0335354 0.0308779 0.0257548 0.0189295 0.011407 0.00443314 -0.00050475 -0.0016782)
                TransformAxis rotation3: coordinates=knee_angle_l axis=(0 1 0)
                  SimmSpline: x=(0 0.174533 0.349066 0.523599 0.698132 0.872665 1.0472 1.22173 1.39626 1.5708 1.74533 1.91986 2.0944)
                      y=(0 -0.059461 -0.109399 -0.150618 -0.18392 -0.210107 -0.229983 -0.24435 -0.254012 -0.25977 -0.262428 -0.262788 -0.261654)
                TransformAxis translation1: coordinates=knee_angle_l axis=(0 1 0)
                  MultiplierFunction: scale=0.9431805
                    SimmSpline: x=(0 0.174533 0.349066 0.523599 0.698132 0.872665 1.0472 1.22173 1.39626 1.5708 1.74533 1.91986 2.0944)
                        y=(0 0.000479 0.000835 0.001086 0.001251 0.001346 0.001391 0.001403 0.0014 0.0014 0.001421 0.001481 0.001599)
                TransformAxis translation2: coordinates=knee_angle_l axis=(0 0 1)
                  MultiplierFunction: scale=0.9368196
                    SimmSpline: x=(0 0.174533 0.349066 0.523599 0.698132 0.872665 1.0472 1.22173 1.39626 1.5708 1.74533 1.91986 2.0944)
                        y=(0 -0.000988 -0.001899 -0.002734 -0.003492 -0.004173 -0.004777 -0.005305 -0.005756 -0.00613 -0.006427 -0.006648 -0.006792)
            CustomJoint patellofemoral_l: socket_parent_frame=femur_l_offset socket_child_frame=patella_l_offset
              Coordinate knee_angle_l_beta: default_value=0 range=(-99999.9 99999.9) clamped=false
              PhysicalOffsetFrame femur_l_offset: socket_parent=/bodyset/femur_l
                  translation=(-0.008022045 -0.3847802 0.002576254)
              PhysicalOffsetFrame patella_l_offset: socket_parent=/bodyset/patella_l translation=(0 0 0)
              SpatialTransform: axes_held_at_zero=(rotation2 rotation3)
                TransformAxis rotation1: coordinates=knee_angle_l_beta axis=(0 0 1)
                  SimmSpline: x=(0 0.174533 0.349066 0.523599 0.698132 0.872665 1.0472 1.22173 1.39626 1.5708 1.74533 1.91986 2.0944)
                      y=(0.00113686 -0.00629212 -0.105582 -0.253683 -0.414245 -0.579047 -0.747244 -0.91799 -1.09044 -1.26379 -1.43763 -1.61186 -1.78634)
                TransformAxis translation1: coordinates=knee_angle_l_beta axis=(1 0 0)
                  MultiplierFunction: scale=0.9916001
                    SimmSpline f23: x=(0 0.174533 0.349066 0.523599 0.698132 0.872665 1.0472 1.22173 1.39626 1.5708 1.74533 1.91986 2.0944)
                        y=(0.0524 0.0488 0.0437 0.0371 0.0296 0.0216 0.0136 0.0057 -0.0019 -0.0088 -0.0148 -0.0196 -0.0227)
                TransformAxis translation2: coordinates=knee_angle_l_beta axis=(0 1 0)
                  MultiplierFunction: scale=0.9431805
                    SimmSpline f24: x=(0 0.174533 0.349066 0.523599 0.698132 0.872665 1.0472 1.22173 1.39626 1.5708 1.74533 1.91986 2.0944)
                        y=(-0.0108 -0.019 -0.0263 -0.0322 -0.0367 -0.0395 -0.0408 -0.0404 -0.0384 -0.0349 -0.0301 -0.0245 -0.0187)
                TransformAxis translation3: axis=(0 0 1) MultiplierFunction(scale=0.9368196, Constant(value=-0.00275))
            PinJoint ankle_l: socket_parent_frame=tibia_l_offset socket_child_frame=talus_l_offset
              Coordinate ankle_angle_l: default_value=0 range=(-1 1) clamped=true
              PhysicalOffsetFrame tibia_l_offset: socket_parent=/bodyset/tibia_l translation=(-0.01022808 -0.4662197 0)
                  orientation=(-0.175895 0.105208 0.0186622)
              PhysicalOffsetFrame talus_l_offset: socket_parent=/bodyset/talus_l translation=(0 0 0)
                  orientation=(-0.175895 0.105208 0.0186622)
            WeldJoint mtp_l: socket_parent_frame=calcn_l_offset socket_child_frame=toes_l_offset
              PhysicalOffsetFrame calcn_l_offset: socket_parent=/bodyset/calcn_l
                  translation=(0.1845641 -0.002956726 -0.00169377) orientation=(-3.14159 -0.619901 0)
              PhysicalOffsetFrame toes_l_offset: socket_parent=/bodyset/toes_l translation=(0 0 0)
                  orientation=(-3.14159 -0.619901 0)
            WeldJoint mtp_r: socket_parent_frame=calcn_r_offset socket_child_frame=toes_r_offset
              PhysicalOffsetFrame calcn_r_offset: socket_parent=/bodyset/calcn_r
                  translation=(0.1845641 -0.002956726 0.00169377) orientation=(-3.14159 0.619901 0)
              PhysicalOffsetFrame toes_r_offset: socket_parent=/bodyset/toes_r translation=(0 0 0)
                  orientation=(-3.14159 0.619901 0)
            WeldJoint back: socket_parent_frame=pelvis_offset socket_child_frame=torso_offset
              PhysicalOffsetFrame pelvis_offset: socket_parent=/bodyset/pelvis translation=(-0.09626171 0.07248372 0)
              PhysicalOffsetFrame torso_offset: socket_parent=/bodyset/torso translation=(0 0 0)
            WeldJoint subtalar_r: socket_parent_frame=talus_r_offset socket_child_frame=calcn_r_offset
              PhysicalOffsetFrame talus_r_offset: socket_parent=/bodyset/talus_r
                  translation=(-0.0557517 -0.0696689 0.0118604) orientation=(-1.76819 0.906223 1.8196)
              PhysicalOffsetFrame calcn_r_offset: socket_parent=/bodyset/calcn_r translation=(0 0 0)
                  orientation=(-1.76819 0.906223 1.8196)
            WeldJoint subtalar_l: socket_parent_frame=talus_l_offset socket_child_frame=calcn_l_offset
              PhysicalOffsetFrame talus_l_offset: socket_parent=/bodyset/talus_l
                  translation=(-0.0557517 -0.0696689 -0.0118604) orientation=(1.76819 -0.906223 1.8196)
              PhysicalOffsetFrame calcn_l_offset: socket_parent=/bodyset/calcn_l translation=(0 0 0)
                  orientation=(1.76819 -0.906223 1.8196)
          ConstraintSet:
            CoordinateCouplerConstraint patellofemoral_knee_angle_r_con: independent_coordinate_names=knee_angle_r
                dependent_coordinate_name=knee_angle_r_beta scale_factor=1
                coupled_coordinates_function=LinearFunction(coefficients=1 0)
            CoordinateCouplerConstraint patellofemoral_knee_angle_l_con: independent_coordinate_names=knee_angle_l
                dependent_coordinate_name=knee_angle_l_beta scale_factor=1
                coupled_coordinates_function=LinearFunction(coefficients=1 0)
          ForceSet:
            CoordinateActuator tau_pelvis_tilt: coordinate=pelvis_tilt optimal_force=1
            CoordinateActuator tau_pelvis_list: coordinate=pelvis_list optimal_force=1
            CoordinateActuator tau_pelvis_rotation: coordinate=pelvis_rotation optimal_force=1
            CoordinateActuator tau_pelvis_tx: coordinate=pelvis_tx optimal_force=10
            CoordinateActuator tau_pelvis_ty: coordinate=pelvis_ty optimal_force=10
            CoordinateActuator tau_pelvis_tz: coordinate=pelvis_tz optimal_force=10
            SmoothSphereHalfSpaceForce [values shared by the 12 below unless stated]: socket_half_space=/contactgeometryset/floor
                stiffness=400000 [N/m^2] dissipation=2 [s/m] static_friction=0.8 dynamic_friction=0.8
                viscous_friction=0.5 transition_velocity=0.2 [m/s] hertz_smoothing=300 hunt_crossley_smoothing=50
            SmoothSphereHalfSpaceForce contactHeel_r: socket_sphere=/contactgeometryset/heel_r
            SmoothSphereHalfSpaceForce contactLateralRearfoot_r: socket_sphere=/contactgeometryset/lateralRearfoot_r
            SmoothSphereHalfSpaceForce contactLateralMidfoot_r: socket_sphere=/contactgeometryset/lateralMidfoot_r
            SmoothSphereHalfSpaceForce contactLateralToe_r: socket_sphere=/contactgeometryset/lateralToe_r
            SmoothSphereHalfSpaceForce contactMedialToe_r: socket_sphere=/contactgeometryset/medialToe_r
            SmoothSphereHalfSpaceForce contactMedialMidfoot_r: socket_sphere=/contactgeometryset/medialMidfoot_r
            SmoothSphereHalfSpaceForce contactHeel_l: socket_sphere=/contactgeometryset/heel_l
            SmoothSphereHalfSpaceForce contactLateralRearfoot_l: socket_sphere=/contactgeometryset/lateralRearfoot_l
            SmoothSphereHalfSpaceForce contactLateralMidfoot_l: socket_sphere=/contactgeometryset/lateralMidfoot_l
            SmoothSphereHalfSpaceForce contactLateralToe_l: socket_sphere=/contactgeometryset/lateralToe_l
            SmoothSphereHalfSpaceForce contactMedialToe_l: socket_sphere=/contactgeometryset/medialToe_l
            SmoothSphereHalfSpaceForce contactMedialMidfoot_l: socket_sphere=/contactgeometryset/medialMidfoot_l
            DeGrooteFregly2016Muscle [values shared by the 80 below unless stated]: min_control=0.01 max_control=1
                max_contraction_velocity=10 ignore_tendon_compliance=true activation_time_constant=0.01
                deactivation_time_constant=0.04 default_activation=0.01 active_force_width_scale=1.5 fiber_damping=0.01
                passive_fiber_strain_at_one_norm_force=0.7 tendon_strain_at_one_norm_force=0.049
                ignore_passive_fiber_force=true
            DeGrooteFregly2016Muscle addbrev_r: max_isometric_force=625.8197 optimal_fiber_length=0.1031942
                tendon_slack_length=0.03548267 pennation_angle_at_optimal=0.1147809 [radians]
              PathPoint P1: pelvis (-0.01825827 -0.08360081 0.01747207)
              PathPoint P2: femur_r (-0.0019832 -0.1112953 0.02332681)
              PathWrap: wrap_object=AB_at_femshaft_r method=hybrid
            DeGrooteFregly2016Muscle addlong_r: max_isometric_force=916.8 optimal_fiber_length=0.1037908
                tendon_slack_length=0.1264285 pennation_angle_at_optimal=0.1377704
              PathPoint P1: pelvis (-0.007245942 -0.07906503 0.0214203)
              PathPoint P2: femur_r (0.01116544 -0.2257687 0.01482982)
              PathWrap: wrap_object=AL_at_femshaft_r method=hybrid
            DeGrooteFregly2016Muscle addmagDist_r: max_isometric_force=597.2951 optimal_fiber_length=0.1706623
                tendon_slack_length=0.08415682 pennation_angle_at_optimal=0.194705
              PathPoint P1: pelvis (-0.07077694 -0.1135461 0.04517782)
              PathPoint P2: femur_r (0.0111555 -0.2475849 0.01808062)
              PathWrap: wrap_object=AMdist_at_femshaft_r method=hybrid
            DeGrooteFregly2016Muscle addmagIsch_r: max_isometric_force=597.2951 optimal_fiber_length=0.1486645
                tendon_slack_length=0.205906 pennation_angle_at_optimal=0.1680443
              PathPoint P1: pelvis (-0.08567042 -0.1154044 0.04732211)
              PathPoint P2: femur_r (0.004769597 -0.3659255 -0.03066207)
              PathWrap: wrap_object=AMisch_at_condyles_r method=hybrid
            DeGrooteFregly2016Muscle addmagMid_r: max_isometric_force=597.2951 optimal_fiber_length=0.1364824
                tendon_slack_length=0.04621541 pennation_angle_at_optimal=0.2073076
              PathPoint P1: pelvis (-0.05033921 -0.1073912 0.03238008)
              PathPoint P2: femur_r (0.002399672 -0.1531723 0.02737391)
              PathWrap: wrap_object=AMmid_at_femshaft_r method=hybrid
            DeGrooteFregly2016Muscle addmagProx_r: max_isometric_force=597.2951 optimal_fiber_length=0.1093064
                tendon_slack_length=0.04173942 pennation_angle_at_optimal=0.3114833
              PathPoint P1: pelvis (-0.02961468 -0.09565153 0.01548658)
              PathPoint P2: femur_r (-0.01514178 -0.07437924 0.029997)
              PathWrap: wrap_object=AMprox_at_femshaft_r method=hybrid
            DeGrooteFregly2016Muscle bflh_r: max_isometric_force=1313.184 optimal_fiber_length=0.09510293
                tendon_slack_length=0.3169058 pennation_angle_at_optimal=0.1759182
              PathPoint P1: pelvis (-0.09941683 -0.1059244 0.0664847)
              PathPoint P2: tibia_r (-0.03446863 -0.04079422 0.03044362)
              PathPoint P3: tibia_r (-0.02935459 -0.05303249 0.03646015)
            DeGrooteFregly2016Muscle bfsh_r: max_isometric_force=557.1148 optimal_fiber_length=0.1083023
                tendon_slack_length=0.1039007 pennation_angle_at_optimal=0.2642232
              PathPoint P1: femur_r (0.004958001 -0.1991056 0.02192158)
              PathPoint P2: tibia_r (-0.03078652 -0.04883651 0.03826511)
              PathWrap: wrap_object=BF_at_gastroc_r method=hybrid
            DeGrooteFregly2016Muscle edl_r: max_isometric_force=603.4982 optimal_fiber_length=0.08022467
                tendon_slack_length=0.4270259 pennation_angle_at_optimal=0.2182582
              PathPoint P1: tibia_r (-0.01636493 -0.1348537 0.02466776)
              PathPoint P2: tibia_r (0.01677405 -0.4382465 0.01347702)
              PathPoint P3: calcn_r (0.09486273 0.0532211 0.001254642)
              PathPoint P4: calcn_r (0.1668098 0.008130995 0.02038801)
              PathPoint P5: toes_r (0.0003096719 0.006948312 0.0239951)
              PathPoint P6: toes_r (0.04572818 -0.0005913451 0.03920764)
            DeGrooteFregly2016Muscle ehl_r: max_isometric_force=285.8675 optimal_fiber_length=0.08618784
                tendon_slack_length=0.3765478 pennation_angle_at_optimal=0.1972681
              PathPoint P1: tibia_r (-0.01431931 -0.1806601 0.02274247)
              PathPoint P2: tibia_r (0.007261938 -0.3390582 0.01973421)
              PathPoint P3: tibia_r (0.02045616 -0.4304376 -0.003369255)
              PathPoint P4: calcn_r (0.1001271 0.05750834 -0.03309121)
              PathPoint P5: calcn_r (0.1334684 0.04568142 -0.04030549)
              PathPoint P6: calcn_r (0.17899 0.02054927 -0.04391258)
              PathPoint P7: toes_r (0.03076068 0.006061291 -0.03842345)
              PathPoint P8: toes_r (0.05811507 0.005026439 -0.02917046)
            DeGrooteFregly2016Muscle fdl_r: max_isometric_force=423.177 optimal_fiber_length=0.05239618
                tendon_slack_length=0.4449832 pennation_angle_at_optimal=0.2248391
              PathPoint P1: tibia_r (-0.002352459 -0.2135288 -0.002165949)
              PathPoint P2: tibia_r (-0.01800142 -0.4248422 -0.01492098)
              PathPoint P3: calcn_r (0.04500562 0.04656848 -0.04391258)
              PathPoint P4: calcn_r (0.07308248 0.02601921 -0.04124645)
              PathPoint P5: calcn_r (0.171145 -0.01197478 0.01819232)
              PathPoint P6: toes_r (-0.001961257 -0.0115312 0.02305413)
              PathPoint P7: toes_r (0.02941877 -0.01049638 0.03371862)
              PathPoint P8: toes_r (0.04552176 -0.008870186 0.03795302)
            DeGrooteFregly2016Muscle fhl_r: max_isometric_force=907.8393 optimal_fiber_length=0.06043453
                tendon_slack_length=0.4063445 pennation_angle_at_optimal=0.2580255
              PathPoint P1: tibia_r (-0.03170705 -0.2521086 0.0240661)
              PathPoint P2: tibia_r (-0.02475196 -0.4278732 -0.00914512)
              PathPoint P3: calcn_r (0.03860571 0.04080283 -0.03779614)
              PathPoint P4: calcn_r (0.1071468 0.0100529 -0.04014861)
              PathPoint P5: calcn_r (0.1781647 -0.007835324 -0.04218742)
              PathPoint P6: toes_r (0.01599969 -0.009461554 -0.04156011)
              PathPoint P7: toes_r (0.05801177 -0.01507934 -0.02838638)
            DeGrooteFregly2016Muscle gaslat_r: max_isometric_force=1575.059 optimal_fiber_length=0.06896197
                tendon_slack_length=0.4410636 pennation_angle_at_optimal=0.2102268
              PathPoint P1: femur_r (-0.0029748 -0.3597289 0.0259499)
              PathPoint P2: calcn_r (0.004541846 0.04582928 -0.008312022)
              PathWrap shank: wrap_object=GasLat_at_shank_r method=hybrid
              PathWrap condyles: wrap_object=Gastroc_at_condyles_r method=hybrid
            DeGrooteFregly2016Muscle gasmed_r: max_isometric_force=3115.515 optimal_fiber_length=0.05956054
                tendon_slack_length=0.4656423 pennation_angle_at_optimal=0.1656816
              PathPoint P1: femur_r (0.007932801 -0.3572764 -0.01948585)
              PathPoint P2: calcn_r (0.004541846 0.04582928 -0.008312022)
              PathWrap shank: wrap_object=GasMed_at_shank_r method=hybrid
              PathWrap condyles: wrap_object=Gastroc_at_condyles_r method=hybrid
            DeGrooteFregly2016Muscle glmax1_r: max_isometric_force=983.7836 optimal_fiber_length=0.135531
                tendon_slack_length=0.04503029 pennation_angle_at_optimal=0.3540118
              PathPoint P1: pelvis (-0.1176747 0.03068327 0.06387525)
              PathPoint P2: pelvis (-0.1201601 -0.02152281 0.08838152)
              PathPoint P3: femur_r (-0.04402705 -0.03074769 0.02829195)
              PathPoint P4: femur_r (-0.02746732 -0.05338402 0.04403052)
              PathWrap: wrap_object=Gmax1_at_pelvis_r method=hybrid
            DeGrooteFregly2016Muscle glmax2_r: max_isometric_force=1406.046 optimal_fiber_length=0.1475793
                tendon_slack_length=0.06381364 pennation_angle_at_optimal=0.3673821
              PathPoint P1: pelvis (-0.1258958 0.007737528 0.05241621)
              PathPoint P2: pelvis (-0.1284772 -0.05416264 0.09223898)
              PathPoint P3: femur_r (-0.04462201 -0.05508174 0.02360785)
              PathPoint P4: femur_r (-0.01546896 -0.09582714 0.03925274)
              PathWrap: wrap_object=Gmax2_at_pelvis_r method=hybrid
            DeGrooteFregly2016Muscle glmax3_r: max_isometric_force=947.7541 optimal_fiber_length=0.1612169
                tendon_slack_length=0.06730236 pennation_angle_at_optimal=0.3824161
              PathPoint P1: pelvis (-0.1242707 -0.04669193 0.01021094)
              PathPoint P2: pelvis (-0.12169 -0.1123279 0.04935299)
              PathPoint P3: femur_r (-0.02786396 -0.1061078 0.008806104)
              PathPoint P4: femur_r (-0.005949601 -0.1338371 0.03850329)
              PathWrap: wrap_object=Gmax3_at_pelvis_r method=hybrid
            DeGrooteFregly2016Muscle glmed1_r: max_isometric_force=1093.467 optimal_fiber_length=0.06540529
                tendon_slack_length=0.05000981 pennation_angle_at_optimal=0.3165559
              PathPoint P1: pelvis (-0.04253882 0.02178963 0.132969)
              PathPoint P2: femur_r (-0.02161688 -0.01103521 0.05199349)
            DeGrooteFregly2016Muscle glmed2_r: max_isometric_force=765.0917 optimal_fiber_length=0.0663956
                tendon_slack_length=0.05934567 pennation_angle_at_optimal=0.3165559
              PathPoint P1: pelvis (-0.08125418 0.02810412 0.07658221)
              PathPoint P2: femur_r (-0.02558328 -0.005470447 0.04937039)
            DeGrooteFregly2016Muscle glmed3_r: max_isometric_force=871.1993 optimal_fiber_length=0.06910111
                tendon_slack_length=0.04281698 pennation_angle_at_optimal=0.3165559
              PathPoint P1: pelvis (-0.1101233 -0.006492404 0.05967734)
              PathPoint P2: femur_r (-0.03064044 -0.004432948 0.04852726)
            DeGrooteFregly2016Muscle glmin1_r: max_isometric_force=374.0459 optimal_fiber_length=0.06006952
                tendon_slack_length=0.01425572 pennation_angle_at_optimal=0.1745329
              PathPoint P1: pelvis (-0.04435509 -0.01325158 0.1182205)
              PathPoint P2: femur_r (-0.007139521 -0.009809077 0.0524619)
            DeGrooteFregly2016Muscle glmin2_r: max_isometric_force=394.8197 optimal_fiber_length=0.04954294
                tendon_slack_length=0.02308971 pennation_angle_at_optimal=0
              PathPoint P1: pelvis (-0.0588852 -0.01262908 0.1101644)
              PathPoint P2: femur_r (-0.009519361 -0.009809077 0.0524619)
            DeGrooteFregly2016Muscle glmin3_r: max_isometric_force=446.7738 optimal_fiber_length=0.0344594
                tendon_slack_length=0.04613252 pennation_angle_at_optimal=0.01745329
              PathPoint P1: pelvis (-0.07542283 -0.01378521 0.09053718)
              PathPoint P2: femur_r (-0.0133866 -0.007828398 0.05152508)
            DeGrooteFregly2016Muscle grac_r: max_isometric_force=281.3115 optimal_fiber_length=0.2247149
                tendon_slack_length=0.1696842 pennation_angle_at_optimal=0.1720016
              PathPoint P1: pelvis (-0.04527282 -0.1150137 0.02786456)
              PathPoint P2: tibia_r (-0.01884014 -0.05542192 -0.03562988)
              PathPoint P3: tibia_r (0.001820598 -0.08114556 -0.01892802)
              PathWrap: wrap_object=GR_at_condyles_r method=hybrid
            DeGrooteFregly2016Muscle iliacus_r: max_isometric_force=1021.141 optimal_fiber_length=0.09855272
                tendon_slack_length=0.08886452 pennation_angle_at_optimal=0.279914
              PathPoint P1: pelvis (-0.05783368 0.02748153 0.09564237)
              PathPoint P2: pelvis (-0.01290502 -0.04953797 0.08577207)
              PathPoint P3: femur_r (-0.00228068 -0.0532897 0.01302179)
              PathPoint P4: femur_r (-0.01209752 -0.0600806 0.01836166)
              PathWrap: wrap_object=IL_at_brim_r method=hybrid range=(2 3)
            DeGrooteFregly2016Muscle perbrev_r: max_isometric_force=521.2016 optimal_fiber_length=0.05513402
                tendon_slack_length=0.1791583 pennation_angle_at_optimal=0.2052361
              PathPoint P1: tibia_r (-0.02485424 -0.2951173 0.03020296)
              PathPoint P2: tibia_r (-0.0346732 -0.4537486 0.0299623)
              PathPoint P3: tibia_r (-0.02915003 -0.4666863 0.03068428)
              PathPoint P4: calcn_r (0.04861842 0.03991578 0.03654152)
              PathPoint P5: calcn_r (0.06988253 0.03237619 0.05379288)
            DeGrooteFregly2016Muscle perlong_r: max_isometric_force=1115.371 optimal_fiber_length=0.06213792
                tendon_slack_length=0.4063682 pennation_angle_at_optimal=0.2479525
              PathPoint P1: tibia_r (-0.02045616 -0.1600302 0.03393321)
              PathPoint P2: tibia_r (-0.03242302 -0.4545642 0.02851833)
              PathPoint P3: tibia_r (-0.02782038 -0.4678519 0.02887933)
              PathPoint P4: calcn_r (0.04521204 0.03400236 0.03465959)
              PathPoint P5: calcn_r (0.07029546 0.01567068 0.04453989)
              PathPoint P6: calcn_r (0.08794668 0.01020075 0.01850598)
              PathPoint P7: calcn_r (0.1241787 0.01256612 -0.02885681)
            DeGrooteFregly2016Muscle piri_r: max_isometric_force=1029.787 optimal_fiber_length=0.02607317
                tendon_slack_length=0.1152296 pennation_angle_at_optimal=0.1745329
              PathPoint P1: pelvis (-0.09732315 -0.005807592 0.01532778)
              PathPoint P2: pelvis (-0.09752361 -0.02726809 0.06911688)
              PathPoint P3: femur_r (-0.01467568 -0.00339545 0.04093902)
            DeGrooteFregly2016Muscle psoas_r: max_isometric_force=1426.79 optimal_fiber_length=0.1081408
                tendon_slack_length=0.09208449 pennation_angle_at_optimal=0.2155251
              PathPoint P1: pelvis (-0.0579293 0.055141 0.04424752)
              PathPoint P2: pelvis (-0.01959658 -0.05816489 0.07442655)
              PathPoint P3: femur_r (-0.01308912 -0.04404653 0.00430937)
              PathPoint P4: femur_r (-0.0233026 -0.04942266 0.008244012)
              PathWrap: wrap_object=PS_at_brim_r method=hybrid range=(2 3)
            DeGrooteFregly2016Muscle recfem_r: max_isometric_force=2191.741 optimal_fiber_length=0.07317146
                tendon_slack_length=0.4323706 pennation_angle_at_optimal=0.2170149
              PathPoint P1: pelvis (-0.02294232 -0.03450759 0.1058541)
              PathPoint P2: patella_r (0.00958 0.046942 0.0006706)
              PathPoint P3: patella_r (0.0115918 0.0418646 -0.000958)
              PathPoint P4: patella_r (0.00479 0.00236626 2.874e-5)
              PathPoint P5: tibia_r (0.03334354 -0.07356949 -0.0005655535)
              PathWrap: wrap_object=KnExt_at_fem_r method=hybrid
            DeGrooteFregly2016Muscle sart_r: max_isometric_force=249.4131 optimal_fiber_length=0.3927684
                tendon_slack_length=0.1208516 pennation_angle_at_optimal=0.02613542
              PathPoint P1: pelvis (-0.0186406 -0.01387417 0.1198086)
              PathPoint P2: femur_r (-0.0029748 -0.3365264 -0.03944011)
              PathPoint P3: tibia_r (-0.02567248 -0.04673853 -0.04392064)
              PathPoint P4: tibia_r (-0.01626265 -0.0698164 -0.03176726)
              PathPoint P5: tibia_r (0.01391019 -0.09440949 -0.003128594)
            DeGrooteFregly2016Muscle semimem_r: max_isometric_force=2200.987 optimal_fiber_length=0.06693033
                tendon_slack_length=0.3371601 pennation_angle_at_optimal=0.2545615
              PathPoint P1: pelvis (-0.09435006 -0.1013882 0.06966144)
              PathPoint P2: tibia_r (-0.02966144 -0.0486034 -0.02358478)
              PathWrap: wrap_object=SM_at_condyles_r method=hybrid
            DeGrooteFregly2016Muscle semiten_r: max_isometric_force=591.2951 optimal_fiber_length=0.1906004
                tendon_slack_length=0.2441255 pennation_angle_at_optimal=0.241295
              PathPoint P1: pelvis (-0.09922559 -0.1114382 0.05842933)
              PathPoint P2: tibia_r (-0.03191161 -0.0592099 -0.02755569)
              PathPoint P3: tibia_r (0.001943335 -0.09009696 -0.01407867)
              PathWrap: wrap_object=ST_at_condyles_r method=hybrid
            DeGrooteFregly2016Muscle soleus_r: max_isometric_force=6194.843 optimal_fiber_length=0.0527615
                tendon_slack_length=0.3318649 pennation_angle_at_optimal=0.3814289
              PathPoint P1: tibia_r (-0.007773342 -0.1067639 0.01179239)
              PathPoint P2: calcn_r (0.004541846 0.04582928 -0.008312022)
            DeGrooteFregly2016Muscle tfl_r: max_isometric_force=411.2066 optimal_fiber_length=0.09026506
                tendon_slack_length=0.4270934 pennation_angle_at_optimal=0.05235988
              PathPoint P1: pelvis (-0.02972943 0.01903255 0.1407976)
              PathPoint P2: femur_r (0.02915304 -0.09384646 0.05592813)
              PathPoint P3: femur_r (0.01061012 -0.3819881 0.03035296)
              PathPoint P4: tibia_r (0.01104633 -0.04778752 0.04163436)
            DeGrooteFregly2016Muscle tibant_r: max_isometric_force=1227.452 optimal_fiber_length=0.08207426
                tendon_slack_length=0.2889555 pennation_angle_at_optimal=0.1951828
              PathPoint P1: tibia_r (0.01575125 -0.1529203 0.01949354)
              PathPoint P2: tibia_r (0.02567248 -0.2221533 0.01540231)
              PathPoint P3: tibia_r (0.02383143 -0.4264744 -0.01588363)
              PathPoint P4: calcn_r (0.1203591 0.02631483 -0.04783332)
            DeGrooteFregly2016Muscle tibpost_r: max_isometric_force=1730.154 optimal_fiber_length=0.04528991
                tendon_slack_length=0.3364149 pennation_angle_at_optimal=0.2264891
              PathPoint P1: tibia_r (-0.004193513 -0.151988 0.01239404)
              PathPoint P2: tibia_r (-0.01677405 -0.4260077 -0.02105784)
              PathPoint P3: calcn_r (0.04304436 0.04937733 -0.04485354)
              PathPoint P4: calcn_r (0.07968881 0.02350598 -0.04406935)
            DeGrooteFregly2016Muscle vasint_r: max_isometric_force=1697.361 optimal_fiber_length=0.09812666
                tendon_slack_length=0.1998213 pennation_angle_at_optimal=0.06309973
              PathPoint P1: femur_r (0.0287564 -0.1814677 0.02904141)
              PathPoint P2: femur_r (0.0332186 -0.1965586 0.02669936)
              PathPoint P3: patella_r (0.0055564 0.045984 -0.0005748)
              PathPoint P4: patella_r (0.00479 0.00236626 -0.00037362)
              PathPoint P5: tibia_r (0.03331283 -0.07366271 0.0005174212)
              PathWrap: wrap_object=KnExt_at_fem_r method=hybrid
            DeGrooteFregly2016Muscle vaslat_r: max_isometric_force=5148.767 optimal_fiber_length=0.09813289
                tendon_slack_length=0.2177892 pennation_angle_at_optimal=0.2528673
              PathPoint P1: femur_r (0.004759681 -0.1748655 0.032695)
              PathPoint P2: femur_r (0.02667404 -0.2443783 0.03831592)
              PathPoint P3: patella_r (0.0098674 0.0405234 0.0135078)
              PathPoint P4: patella_r (0.00479 0.00236626 0.00702214)
              PathPoint P5: tibia_r (0.03328221 -0.07387249 0.00614889)
              PathWrap: wrap_object=KnExt_at_fem_r method=hybrid
            DeGrooteFregly2016Muscle vasmed_r: max_isometric_force=2747.823 optimal_fiber_length=0.09599162
                tendon_slack_length=0.1982349 pennation_angle_at_optimal=0.4222225
              PathPoint P1: femur_r (0.0138824 -0.1979734 0.01761221)
              PathPoint P2: femur_r (0.03530097 -0.2611665 0.0008431376)
              PathPoint P3: patella_r (0.0060354 0.042631 -0.016286)
              PathPoint P4: patella_r (0.00479 0.00236626 -0.008143)
              PathPoint P5: tibia_r (0.03262758 -0.07409394 -0.008158409)
              PathWrap: wrap_object=KnExt_at_fem_r method=hybrid
            DeGrooteFregly2016Muscle addbrev_l: max_isometric_force=625.8197 optimal_fiber_length=0.1031942
                tendon_slack_length=0.03548267 pennation_angle_at_optimal=0.1147809
              PathPoint P1: pelvis (-0.01825827 -0.08360081 -0.01747207)
              PathPoint P2: femur_l (-0.0019832 -0.1112953 -0.02332681)
              PathWrap: wrap_object=AB_at_femshaft_l method=hybrid
            DeGrooteFregly2016Muscle addlong_l: max_isometric_force=916.8 optimal_fiber_length=0.1037908
                tendon_slack_length=0.1264285 pennation_angle_at_optimal=0.1377704
              PathPoint P1: pelvis (-0.007245942 -0.07906503 -0.0214203)
              PathPoint P2: femur_l (0.01116544 -0.2257687 -0.01482982)
              PathWrap: wrap_object=AL_at_femshaft_l method=hybrid
            DeGrooteFregly2016Muscle addmagDist_l: max_isometric_force=597.2951 optimal_fiber_length=0.1706623
                tendon_slack_length=0.08415682 pennation_angle_at_optimal=0.194705
              PathPoint P1: pelvis (-0.07077694 -0.1135461 -0.04517782)
              PathPoint P2: femur_l (0.0111555 -0.2475849 -0.01808062)
              PathWrap: wrap_object=AMdist_at_femshaft_l method=hybrid
            DeGrooteFregly2016Muscle addmagIsch_l: max_isometric_force=597.2951 optimal_fiber_length=0.1486645
                tendon_slack_length=0.205906 pennation_angle_at_optimal=0.1680443
              PathPoint P1: pelvis (-0.08567042 -0.1154044 -0.04732211)
              PathPoint P2: femur_l (0.004769597 -0.3659255 0.03066207)
              PathWrap: wrap_object=AMisch_at_condyles_l method=hybrid
            DeGrooteFregly2016Muscle addmagMid_l: max_isometric_force=597.2951 optimal_fiber_length=0.1364824
                tendon_slack_length=0.04621541 pennation_angle_at_optimal=0.2073076
              PathPoint P1: pelvis (-0.05033921 -0.1073912 -0.03238008)
              PathPoint P2: femur_l (0.002399672 -0.1531723 -0.02737391)
              PathWrap: wrap_object=AMmid_at_femshaft_l method=hybrid
            DeGrooteFregly2016Muscle addmagProx_l: max_isometric_force=597.2951 optimal_fiber_length=0.1093064
                tendon_slack_length=0.04173942 pennation_angle_at_optimal=0.3114833
              PathPoint P1: pelvis (-0.02961468 -0.09565153 -0.01548658)
              PathPoint P2: femur_l (-0.01514178 -0.07437924 -0.029997)
              PathWrap: wrap_object=AMprox_at_femshaft_l method=hybrid
            DeGrooteFregly2016Muscle bflh_l: max_isometric_force=1313.184 optimal_fiber_length=0.09510293
                tendon_slack_length=0.3169058 pennation_angle_at_optimal=0.1759182
              PathPoint P1: pelvis (-0.09941683 -0.1059244 -0.0664847)
              PathPoint P2: tibia_l (-0.03446863 -0.04079422 -0.03044362)
              PathPoint P3: tibia_l (-0.02935459 -0.05303249 -0.03646015)
            DeGrooteFregly2016Muscle bfsh_l: max_isometric_force=557.1148 optimal_fiber_length=0.1083023
                tendon_slack_length=0.1039007 pennation_angle_at_optimal=0.2642232
              PathPoint P1: femur_l (0.004958001 -0.1991056 -0.02192158)
              PathPoint P2: tibia_l (-0.03078652 -0.04883651 -0.03826511)
              PathWrap: wrap_object=BF_at_gastroc_l method=hybrid
            DeGrooteFregly2016Muscle edl_l: max_isometric_force=603.4982 optimal_fiber_length=0.08022467
                tendon_slack_length=0.4270259 pennation_angle_at_optimal=0.2182582
              PathPoint P1: tibia_l (-0.01636493 -0.1348537 -0.02466776)
              PathPoint P2: tibia_l (0.01677405 -0.4382465 -0.01347702)
              PathPoint P3: calcn_l (0.09486273 0.0532211 -0.001254642)
              PathPoint P4: calcn_l (0.1668098 0.008130995 -0.02038801)
              PathPoint P5: toes_l (0.0003096719 0.006948312 -0.0239951)
              PathPoint P6: toes_l (0.04572818 -0.0005913451 -0.03920764)
            DeGrooteFregly2016Muscle ehl_l: max_isometric_force=285.8675 optimal_fiber_length=0.08618784
                tendon_slack_length=0.3765478 pennation_angle_at_optimal=0.1972681
              PathPoint P1: tibia_l (-0.01431931 -0.1806601 -0.02274247)
              PathPoint P2: tibia_l (0.007261938 -0.3390582 -0.01973421)
              PathPoint P3: tibia_l (0.02045616 -0.4304376 0.003369255)
              PathPoint P4: calcn_l (0.1001271 0.05750834 0.03309121)
              PathPoint P5: calcn_l (0.1334684 0.04568142 0.04030549)
              PathPoint P6: calcn_l (0.17899 0.02054927 0.04391258)
              PathPoint P7: toes_l (0.03076068 0.006061291 0.03842345)
              PathPoint P8: toes_l (0.05811507 0.005026439 0.02917046)
            DeGrooteFregly2016Muscle fdl_l: max_isometric_force=423.177 optimal_fiber_length=0.05239618
                tendon_slack_length=0.4449832 pennation_angle_at_optimal=0.2248391
              PathPoint P1: tibia_l (-0.002352459 -0.2135288 0.002165949)
              PathPoint P2: tibia_l (-0.01800142 -0.4248422 0.01492098)
              PathPoint P3: calcn_l (0.04500562 0.04656848 0.04391258)
              PathPoint P4: calcn_l (0.07308248 0.02601921 0.04124645)
              PathPoint P5: calcn_l (0.171145 -0.01197478 -0.01819232)
              PathPoint P6: toes_l (-0.001961257 -0.0115312 -0.02305413)
              PathPoint P7: toes_l (0.02941877 -0.01049638 -0.03371862)
              PathPoint P8: toes_l (0.04552176 -0.008870186 -0.03795302)
            DeGrooteFregly2016Muscle fhl_l: max_isometric_force=907.8393 optimal_fiber_length=0.06043453
                tendon_slack_length=0.4063445 pennation_angle_at_optimal=0.2580255
              PathPoint P1: tibia_l (-0.03170705 -0.2521086 -0.0240661)
              PathPoint P2: tibia_l (-0.02475196 -0.4278732 0.00914512)
              PathPoint P3: calcn_l (0.03860571 0.04080283 0.03779614)
              PathPoint P4: calcn_l (0.1071468 0.0100529 0.04014861)
              PathPoint P5: calcn_l (0.1781647 -0.007835324 0.04218742)
              PathPoint P6: toes_l (0.01599969 -0.009461554 0.04156011)
              PathPoint P7: toes_l (0.05801177 -0.01507934 0.02838638)
            DeGrooteFregly2016Muscle gaslat_l: max_isometric_force=1575.059 optimal_fiber_length=0.06896197
                tendon_slack_length=0.4410636 pennation_angle_at_optimal=0.2102268
              PathPoint P1: femur_l (-0.0029748 -0.3597289 -0.0259499)
              PathPoint P2: calcn_l (0.004541846 0.04582928 0.008312022)
              PathWrap shank: wrap_object=GasLat_at_shank_l method=hybrid
              PathWrap condyles: wrap_object=Gastroc_at_condyles_l method=hybrid
            DeGrooteFregly2016Muscle gasmed_l: max_isometric_force=3115.515 optimal_fiber_length=0.05956054
                tendon_slack_length=0.4656423 pennation_angle_at_optimal=0.1656816
              PathPoint P1: femur_l (0.007932801 -0.3572764 0.01948585)
              PathPoint P2: calcn_l (0.004541846 0.04582928 0.008312022)
              PathWrap shank: wrap_object=GasMed_at_shank_l method=hybrid
              PathWrap condyles: wrap_object=Gastroc_at_condyles_l method=hybrid
            DeGrooteFregly2016Muscle glmax1_l: max_isometric_force=983.7836 optimal_fiber_length=0.135531
                tendon_slack_length=0.04503029 pennation_angle_at_optimal=0.3540118
              PathPoint P1: pelvis (-0.1176747 0.03068327 -0.06387525)
              PathPoint P2: pelvis (-0.1201601 -0.02152281 -0.08838152)
              PathPoint P3: femur_l (-0.04402705 -0.03074769 -0.02829195)
              PathPoint P4: femur_l (-0.02746732 -0.05338402 -0.04403052)
              PathWrap: wrap_object=Gmax1_at_pelvis_l method=hybrid
            DeGrooteFregly2016Muscle glmax2_l: max_isometric_force=1406.046 optimal_fiber_length=0.1475793
                tendon_slack_length=0.06381364 pennation_angle_at_optimal=0.3673821
              PathPoint P1: pelvis (-0.1258958 0.007737528 -0.05241621)
              PathPoint P2: pelvis (-0.1284772 -0.05416264 -0.09223898)
              PathPoint P3: femur_l (-0.04462201 -0.05508174 -0.02360785)
              PathPoint P4: femur_l (-0.01546896 -0.09582714 -0.03925274)
              PathWrap: wrap_object=Gmax2_at_pelvis_l method=hybrid
            DeGrooteFregly2016Muscle glmax3_l: max_isometric_force=947.7541 optimal_fiber_length=0.1612169
                tendon_slack_length=0.06730236 pennation_angle_at_optimal=0.3824161
              PathPoint P1: pelvis (-0.1242707 -0.04669193 -0.01021094)
              PathPoint P2: pelvis (-0.12169 -0.1123279 -0.04935299)
              PathPoint P3: femur_l (-0.02786396 -0.1061078 -0.008806104)
              PathPoint P4: femur_l (-0.005949601 -0.1338371 -0.03850329)
              PathWrap: wrap_object=Gmax3_at_pelvis_l method=hybrid
            DeGrooteFregly2016Muscle glmed1_l: max_isometric_force=1093.467 optimal_fiber_length=0.06540529
                tendon_slack_length=0.05000981 pennation_angle_at_optimal=0.3165559
              PathPoint P1: pelvis (-0.04253882 0.02178963 -0.132969)
              PathPoint P2: femur_l (-0.02161688 -0.01103521 -0.05199349)
            DeGrooteFregly2016Muscle glmed2_l: max_isometric_force=765.0917 optimal_fiber_length=0.0663956
                tendon_slack_length=0.05934567 pennation_angle_at_optimal=0.3165559
              PathPoint P1: pelvis (-0.08125418 0.02810412 -0.07658221)
              PathPoint P2: femur_l (-0.02558328 -0.005470447 -0.04937039)
            DeGrooteFregly2016Muscle glmed3_l: max_isometric_force=871.1993 optimal_fiber_length=0.06910111
                tendon_slack_length=0.04281698 pennation_angle_at_optimal=0.3165559
              PathPoint P1: pelvis (-0.1101233 -0.006492404 -0.05967734)
              PathPoint P2: femur_l (-0.03064044 -0.004432948 -0.04852726)
            DeGrooteFregly2016Muscle glmin1_l: max_isometric_force=374.0459 optimal_fiber_length=0.06006952
                tendon_slack_length=0.01425572 pennation_angle_at_optimal=0.1745329
              PathPoint P1: pelvis (-0.04435509 -0.01325158 -0.1182205)
              PathPoint P2: femur_l (-0.007139521 -0.009809077 -0.0524619)
            DeGrooteFregly2016Muscle glmin2_l: max_isometric_force=394.8197 optimal_fiber_length=0.04954294
                tendon_slack_length=0.02308971 pennation_angle_at_optimal=0
              PathPoint P1: pelvis (-0.0588852 -0.01262908 -0.1101644)
              PathPoint P2: femur_l (-0.009519361 -0.009809077 -0.0524619)
            DeGrooteFregly2016Muscle glmin3_l: max_isometric_force=446.7738 optimal_fiber_length=0.0344594
                tendon_slack_length=0.04613252 pennation_angle_at_optimal=0.01745329
              PathPoint P1: pelvis (-0.07542283 -0.01378521 -0.09053718)
              PathPoint P2: femur_l (-0.0133866 -0.007828398 -0.05152508)
            DeGrooteFregly2016Muscle grac_l: max_isometric_force=281.3115 optimal_fiber_length=0.2247149
                tendon_slack_length=0.1696842 pennation_angle_at_optimal=0.1720016
              PathPoint P1: pelvis (-0.04527282 -0.1150137 -0.02786456)
              PathPoint P2: tibia_l (-0.01884014 -0.05542192 0.03562988)
              PathPoint P3: tibia_l (0.001820598 -0.08114556 0.01892802)
              PathWrap: wrap_object=GR_at_condyles_l method=hybrid
            DeGrooteFregly2016Muscle iliacus_l: max_isometric_force=1021.141 optimal_fiber_length=0.09855272
                tendon_slack_length=0.08886452 pennation_angle_at_optimal=0.279914
              PathPoint P1: pelvis (-0.05783368 0.02748153 -0.09564237)
              PathPoint P2: pelvis (-0.01290502 -0.04953797 -0.08577207)
              PathPoint P3: femur_l (-0.00228068 -0.0532897 -0.01302179)
              PathPoint P4: femur_l (-0.01209752 -0.0600806 -0.01836166)
              PathWrap: wrap_object=IL_at_brim_l method=hybrid range=(2 3)
            DeGrooteFregly2016Muscle perbrev_l: max_isometric_force=521.2016 optimal_fiber_length=0.05513402
                tendon_slack_length=0.1791583 pennation_angle_at_optimal=0.2052361
              PathPoint P1: tibia_l (-0.02485424 -0.2951173 -0.03020296)
              PathPoint P2: tibia_l (-0.0346732 -0.4537486 -0.0299623)
              PathPoint P3: tibia_l (-0.02915003 -0.4666863 -0.03068428)
              PathPoint P4: calcn_l (0.04861842 0.03991578 -0.03654152)
              PathPoint P5: calcn_l (0.06988253 0.03237619 -0.05379288)
            DeGrooteFregly2016Muscle perlong_l: max_isometric_force=1115.371 optimal_fiber_length=0.06213792
                tendon_slack_length=0.4063682 pennation_angle_at_optimal=0.2479525
              PathPoint P1: tibia_l (-0.02045616 -0.1600302 -0.03393321)
              PathPoint P2: tibia_l (-0.03242302 -0.4545642 -0.02851833)
              PathPoint P3: tibia_l (-0.02782038 -0.4678519 -0.02887933)
              PathPoint P4: calcn_l (0.04521204 0.03400236 -0.03465959)
              PathPoint P5: calcn_l (0.07029546 0.01567068 -0.04453989)
              PathPoint P6: calcn_l (0.08794668 0.01020075 -0.01850598)
              PathPoint P7: calcn_l (0.1241787 0.01256612 0.02885681)
            DeGrooteFregly2016Muscle piri_l: max_isometric_force=1029.787 optimal_fiber_length=0.02607317
                tendon_slack_length=0.1152296 pennation_angle_at_optimal=0.1745329
              PathPoint P1: pelvis (-0.09732315 -0.005807592 -0.01532778)
              PathPoint P2: pelvis (-0.09752361 -0.02726809 -0.06911688)
              PathPoint P3: femur_l (-0.01467568 -0.00339545 -0.04093902)
            DeGrooteFregly2016Muscle psoas_l: max_isometric_force=1426.79 optimal_fiber_length=0.1081408
                tendon_slack_length=0.09208449 pennation_angle_at_optimal=0.2155251
              PathPoint P1: pelvis (-0.0579293 0.055141 -0.04424752)
              PathPoint P2: pelvis (-0.01959658 -0.05816489 -0.07442655)
              PathPoint P3: femur_l (-0.01308912 -0.04404653 -0.00430937)
              PathPoint P4: femur_l (-0.0233026 -0.04942266 -0.008244012)
              PathWrap: wrap_object=PS_at_brim_l method=hybrid range=(2 3)
            DeGrooteFregly2016Muscle recfem_l: max_isometric_force=2191.741 optimal_fiber_length=0.07317146
                tendon_slack_length=0.4323706 pennation_angle_at_optimal=0.2170149
              PathPoint P1: pelvis (-0.02294232 -0.03450759 -0.1058541)
              PathPoint P2: patella_l (0.00958 0.046942 -0.0006706)
              PathPoint P3: patella_l (0.0115918 0.0418646 0.000958)
              PathPoint P4: patella_l (0.00479 0.00236626 -2.874e-5)
              PathPoint P5: tibia_l (0.03334354 -0.07356949 0.0005655535)
              PathWrap: wrap_object=KnExt_at_fem_l method=hybrid
            DeGrooteFregly2016Muscle sart_l: max_isometric_force=249.4131 optimal_fiber_length=0.3927684
                tendon_slack_length=0.1208516 pennation_angle_at_optimal=0.02613542
              PathPoint P1: pelvis (-0.0186406 -0.01387417 -0.1198086)
              PathPoint P2: femur_l (-0.0029748 -0.3365264 0.03944011)
              PathPoint P3: tibia_l (-0.02567248 -0.04673853 0.04392064)
              PathPoint P4: tibia_l (-0.01626265 -0.0698164 0.03176726)
              PathPoint P5: tibia_l (0.01391019 -0.09440949 0.003128594)
            DeGrooteFregly2016Muscle semimem_l: max_isometric_force=2200.987 optimal_fiber_length=0.06693033
                tendon_slack_length=0.3371601 pennation_angle_at_optimal=0.2545615
              PathPoint P1: pelvis (-0.09435006 -0.1013882 -0.06966144)
              PathPoint P2: tibia_l (-0.02966144 -0.0486034 0.02358478)
              PathWrap: wrap_object=SM_at_condyles_l method=hybrid
            DeGrooteFregly2016Muscle semiten_l: max_isometric_force=591.2951 optimal_fiber_length=0.1906004
                tendon_slack_length=0.2441255 pennation_angle_at_optimal=0.241295
              PathPoint P1: pelvis (-0.09922559 -0.1114382 -0.05842933)
              PathPoint P2: tibia_l (-0.03191161 -0.0592099 0.02755569)
              PathPoint P3: tibia_l (0.001943335 -0.09009696 0.01407867)
              PathWrap: wrap_object=ST_at_condyles_l method=hybrid
            DeGrooteFregly2016Muscle soleus_l: max_isometric_force=6194.843 optimal_fiber_length=0.0527615
                tendon_slack_length=0.3318649 pennation_angle_at_optimal=0.3814289
              PathPoint P1: tibia_l (-0.007773342 -0.1067639 -0.01179239)
              PathPoint P2: calcn_l (0.004541846 0.04582928 0.008312022)
            DeGrooteFregly2016Muscle tfl_l: max_isometric_force=411.2066 optimal_fiber_length=0.09026506
                tendon_slack_length=0.4270934 pennation_angle_at_optimal=0.05235988
              PathPoint P1: pelvis (-0.02972943 0.01903255 -0.1407976)
              PathPoint P2: femur_l (0.02915304 -0.09384646 -0.05592813)
              PathPoint P3: femur_l (0.01061012 -0.3819881 -0.03035296)
              PathPoint P4: tibia_l (0.01104633 -0.04778752 -0.04163436)
            DeGrooteFregly2016Muscle tibant_l: max_isometric_force=1227.452 optimal_fiber_length=0.08207426
                tendon_slack_length=0.2889555 pennation_angle_at_optimal=0.1951828
              PathPoint P1: tibia_l (0.01575125 -0.1529203 -0.01949354)
              PathPoint P2: tibia_l (0.02567248 -0.2221533 -0.01540231)
              PathPoint P3: tibia_l (0.02383143 -0.4264744 0.01588363)
              PathPoint P4: calcn_l (0.1203591 0.02631483 0.04783332)
            DeGrooteFregly2016Muscle tibpost_l: max_isometric_force=1730.154 optimal_fiber_length=0.04528991
                tendon_slack_length=0.3364149 pennation_angle_at_optimal=0.2264891
              PathPoint P1: tibia_l (-0.004193513 -0.151988 -0.01239404)
              PathPoint P2: tibia_l (-0.01677405 -0.4260077 0.02105784)
              PathPoint P3: calcn_l (0.04304436 0.04937733 0.04485354)
              PathPoint P4: calcn_l (0.07968881 0.02350598 0.04406935)
            DeGrooteFregly2016Muscle vasint_l: max_isometric_force=1697.361 optimal_fiber_length=0.09812666
                tendon_slack_length=0.1998213 pennation_angle_at_optimal=0.06309973
              PathPoint P1: femur_l (0.0287564 -0.1814677 -0.02904141)
              PathPoint P2: femur_l (0.0332186 -0.1965586 -0.02669936)
              PathPoint P3: patella_l (0.0055564 0.045984 0.0005748)
              PathPoint P4: patella_l (0.00479 0.00236626 0.00037362)
              PathPoint P5: tibia_l (0.03331283 -0.07366271 -0.0005174212)
              PathWrap: wrap_object=KnExt_at_fem_l method=hybrid
            DeGrooteFregly2016Muscle vaslat_l: max_isometric_force=5148.767 optimal_fiber_length=0.09813289
                tendon_slack_length=0.2177892 pennation_angle_at_optimal=0.2528673
              PathPoint P1: femur_l (0.004759681 -0.1748655 -0.032695)
              PathPoint P2: femur_l (0.02667404 -0.2443783 -0.03831592)
              PathPoint P3: patella_l (0.0098674 0.0405234 -0.0135078)
              PathPoint P4: patella_l (0.00479 0.00236626 -0.00702214)
              PathPoint P5: tibia_l (0.03328221 -0.07387249 -0.00614889)
              PathWrap: wrap_object=KnExt_at_fem_l method=hybrid
            DeGrooteFregly2016Muscle vasmed_l: max_isometric_force=2747.823 optimal_fiber_length=0.09599162
                tendon_slack_length=0.1982349 pennation_angle_at_optimal=0.4222225
              PathPoint P1: femur_l (0.0138824 -0.1979734 -0.01761221)
              PathPoint P2: femur_l (0.03530097 -0.2611665 -0.0008431376)
              PathPoint P3: patella_l (0.0060354 0.042631 0.016286)
              PathPoint P4: patella_l (0.00479 0.00236626 0.008143)
              PathPoint P5: tibia_l (0.03262758 -0.07409394 0.008158409)
              PathWrap: wrap_object=KnExt_at_fem_l method=hybrid
            CoordinateActuator reserve_jointset_hip_r_hip_flexion_r: coordinate=hip_flexion_r optimal_force=250
            CoordinateActuator reserve_jointset_hip_r_hip_adduction_r: coordinate=hip_adduction_r optimal_force=250
            CoordinateActuator reserve_jointset_hip_r_hip_rotation_r: coordinate=hip_rotation_r optimal_force=250
            CoordinateActuator reserve_jointset_walker_knee_r_knee_angle_r: coordinate=knee_angle_r optimal_force=250
            CoordinateActuator reserve_jointset_ankle_r_ankle_angle_r: coordinate=ankle_angle_r optimal_force=250
            CoordinateActuator reserve_jointset_hip_l_hip_flexion_l: coordinate=hip_flexion_l optimal_force=250
            CoordinateActuator reserve_jointset_hip_l_hip_adduction_l: coordinate=hip_adduction_l optimal_force=250
            CoordinateActuator reserve_jointset_hip_l_hip_rotation_l: coordinate=hip_rotation_l optimal_force=250
            CoordinateActuator reserve_jointset_walker_knee_l_knee_angle_l: coordinate=knee_angle_l optimal_force=250
            CoordinateActuator reserve_jointset_ankle_l_ankle_angle_l: coordinate=ankle_angle_l optimal_force=250
            ObjectGroup right_leg
            ObjectGroup left_leg
            ObjectGroup hip_add_r
            ObjectGroup hip_abd_r
            ObjectGroup hip_flex_r
            ObjectGroup hip_ext_r
            ObjectGroup hip_inrot_r
            ObjectGroup hip_exrot_r
            ObjectGroup knee_flex_r
            ObjectGroup knee_ext_r
            ObjectGroup ankle_df_r
            ObjectGroup ankle_pf_r
            ObjectGroup everter_r
            ObjectGroup inverter_r
            ObjectGroup hip_add_l
            ObjectGroup hip_abd_l
            ObjectGroup hip_flex_l
            ObjectGroup hip_ext_l
            ObjectGroup hip_exrot_l
            ObjectGroup hip_inrot_l
            ObjectGroup knee_flex_l
            ObjectGroup knee_ext_l
            ObjectGroup ankle_df_l
            ObjectGroup ankle_pf_l
            ObjectGroup everter_l
          MarkerSet:
            Marker APEX: torso (-0.00709694 0.61642 0.0009124291)
            Marker LASI: pelvis (0.009622571 0 -0.1287493) fixed=true
            Marker RASI: pelvis (0.009622571 0 0.1287493) fixed=true
            Marker LPS2: pelvis (-0.1680104 0.001654542 -0.03191586)
            Marker RPS2: pelvis (-0.1698791 -0.0007083516 0.03354515)
            Marker LGTR: pelvis (-0.06998234 -0.07368184 -0.1755672) fixed=true
            Marker LLEP: femur_l (0.002070146 -0.3969736 -0.05469121) fixed=true
            Marker LMEP: femur_l (0.02059651 -0.3958952 0.05950896) fixed=true
            Marker LTTB: tibia_l (0.04743586 -0.07155485 -0.006376415) fixed=true
            Marker LFBH: tibia_l (-0.004727882 -0.08245534 -0.06015845) fixed=true
            Marker LLML: tibia_l (0 -0.4148367 -0.05208894) fixed=true
            Marker LMML: tibia_l (0.0007197836 -0.4019325 0.02930644) fixed=true
            Marker L2MT: toes_l (0.003917757 0.04748295 -0.001269997) fixed=true
            Marker L1MT: calcn_l (0.1801394 0.04036158 0.02737236) fixed=true
            Marker L5MT: calcn_l (0.1316026 0.04036158 -0.05146291) fixed=true
            Marker LCAL: calcn_l (-0.0101198 0.03303092 0.0006623698) fixed=true
            Marker RGTR: pelvis (-0.06998234 -0.07368184 0.1755672) fixed=true
            Marker RLEP: femur_r (0.002070146 -0.3974829 0.05469121) fixed=true
            Marker RMEP: femur_r (0.009577533 -0.3988437 -0.05713235) fixed=true
            Marker RTTB: tibia_r (0.05088341 -0.07412984 0.007874886) fixed=true
            Marker RFBH: tibia_r (-0.007844101 -0.08227952 0.06030725) fixed=true
            Marker RLML: tibia_r (0.001417511 -0.414736 0.05108744) fixed=true
            Marker RMML: tibia_r (0.0172049 -0.4039801 -0.03153226) fixed=true
            Marker R2MT: toes_r (0.0004791301 0.04748295 0.002599808) fixed=true
            Marker R1MT: calcn_r (0.1801394 0.04036158 -0.02737236) fixed=true
            Marker R5MT: calcn_r (0.1494955 0.04036158 0.05341123) fixed=true
            Marker RCAL: calcn_r (-0.003813905 0.03381952 -0.006858327) fixed=true
            Marker RTH1: femur_r (0.0490204 -0.07489227 0.09861401)
            Marker RTH2: femur_r (0.04753971 -0.1682964 0.0887492)
            Marker RTH3: femur_r (-0.009118723 -0.1664668 0.1094575)
            Marker LTH1: femur_l (-0.005752263 -0.09081937 -0.09906441)
            Marker LTH3: femur_l (0.04753967 -0.174307 -0.09140894)
            Marker LTH2: femur_l (-0.009118726 -0.1737614 -0.1039749)
            Marker RSH1: tibia_r (0.02027316 -0.143728 0.0597171)
            Marker RSH2: tibia_r (0.01918111 -0.2171798 0.05971714)
            Marker RSH3: tibia_r (-0.02402882 -0.2163083 0.05971714)
            Marker LSH1: tibia_l (-0.01399251 -0.1280626 -0.06325197)
            Marker LSH2: tibia_l (-0.01154284 -0.2165989 -0.05824673)
            Marker LSH3: tibia_l (0.02959442 -0.2137971 -0.05358765)
            Marker RPS1: pelvis (-0.1649773 0.05661172 0.03492627)
            Marker LPS1: pelvis (-0.1602327 0.03887468 -0.02958122)
          ContactGeometrySet:
            ContactHalfSpace floor: socket_frame=/ground location=(0.8 -0.06 -0.5) orientation=(0 0 -1.570796)
            ContactSphere heel_r: socket_frame=/bodyset/calcn_r location=(0.0146421 0 -0.0122799) radius=0.035
            ContactSphere lateralRearfoot_r: socket_frame=/bodyset/calcn_r location=(0.0849291 0 0.0338649)
                radius=0.035
            ContactSphere lateralMidfoot_r: socket_frame=/bodyset/calcn_r location=(0.153362 0 0.0594829) radius=0.035
            ContactSphere lateralToe_r: socket_frame=/bodyset/calcn_r location=(0.223014 0 0.0670461) radius=0.035
            ContactSphere medialToe_r: socket_frame=/bodyset/calcn_r location=(0.274363 0 -0.026039) radius=0.035
            ContactSphere medialMidfoot_r: socket_frame=/bodyset/calcn_r location=(0.203637 0 -0.0398688) radius=0.035
            ContactSphere heel_l: socket_frame=/bodyset/calcn_l location=(0.0146421 0 0.0122799) radius=0.035
            ContactSphere lateralRearfoot_l: socket_frame=/bodyset/calcn_l location=(0.0849291 0 -0.0338649)
                radius=0.035
            ContactSphere lateralMidfoot_l: socket_frame=/bodyset/calcn_l location=(0.153362 0 -0.0594829) radius=0.035
            ContactSphere lateralToe_l: socket_frame=/bodyset/calcn_l location=(0.223014 0 -0.0670461) radius=0.035
            ContactSphere medialToe_l: socket_frame=/bodyset/calcn_l location=(0.274363 0 0.026039) radius=0.035
            ContactSphere medialMidfoot_l: socket_frame=/bodyset/calcn_l location=(0.203637 0 0.0398688) radius=0.035
          ComponentSet:
            IMU torso_imu_offset_imu: socket_frame=/bodyset/torso/torso_imu_offset
            IMU toes_r_imu_offset_imu: socket_frame=/bodyset/toes_r/toes_r_imu_offset
            IMU toes_l_imu_offset_imu: socket_frame=/bodyset/toes_l/toes_l_imu_offset
            IMU pelvis_imu_offset_imu: socket_frame=/bodyset/pelvis/pelvis_imu_offset
            IMU femur_r_imu_offset_imu: socket_frame=/bodyset/femur_r/femur_r_imu_offset
            IMU femur_l_imu_offset_imu: socket_frame=/bodyset/femur_l/femur_l_imu_offset
            IMU tibia_r_imu_offset_imu: socket_frame=/bodyset/tibia_r/tibia_r_imu_offset
            IMU tibia_l_imu_offset_imu: socket_frame=/bodyset/tibia_l/tibia_l_imu_offset
      MocoInitialBounds time_initial_bounds: bounds=24.9
      MocoFinalBounds time_final_bounds: bounds=26.3
      state_infos:
        MocoVariableInfo /jointset/ground_pelvis/pelvis_tx/value: bounds=(3.571114 6.670675) initial_bounds=4.463892
        MocoVariableInfo /jointset/ground_pelvis/pelvis_tilt/value: bounds=(-0.1246729 -0.02152172)
            initial_bounds=-0.07881213
        MocoVariableInfo /jointset/ground_pelvis/pelvis_list/value: bounds=(-0.1117311 0.07002027)
            initial_bounds=0.005580428
        MocoVariableInfo /jointset/ground_pelvis/pelvis_rotation/value: bounds=(-0.101844 0.2273824)
            initial_bounds=0.007237939
        MocoVariableInfo /jointset/ground_pelvis/pelvis_ty/value: bounds=(0.722936 1.129837) initial_bounds=0.9197291
        MocoVariableInfo /jointset/ground_pelvis/pelvis_tz/value: bounds=(-0.6569014 -0.3991171)
            initial_bounds=-0.5438951
        MocoVariableInfo /jointset/hip_r/hip_flexion_r/value: bounds=(-0.0007099246 0.6684274) initial_bounds=0.4208138
        MocoVariableInfo /jointset/hip_r/hip_adduction_r/value: bounds=(-0.1204226 0.2399997) initial_bounds=0.05168447
        MocoVariableInfo /jointset/hip_r/hip_rotation_r/value: bounds=(-0.2468452 0.03584602)
            initial_bounds=-0.06289467
        MocoVariableInfo /jointset/hip_l/hip_flexion_l/value: bounds=(-0.04406412 0.7967622) initial_bounds=-0.01816839
        MocoVariableInfo /jointset/hip_l/hip_adduction_l/value: bounds=(-0.06894758 0.2035759) initial_bounds=0.1534695
        MocoVariableInfo /jointset/hip_l/hip_rotation_l/value: bounds=(-0.1728306 0.1232994) initial_bounds=-0.01250153
        MocoVariableInfo /jointset/walker_knee_r/knee_angle_r/value: bounds=(0.04588433 1.300084)
            initial_bounds=0.05987874
        MocoVariableInfo /jointset/patellofemoral_r/knee_angle_r_beta/value: bounds=(0.04588433 1.300084)
            initial_bounds=0.05987874
        MocoVariableInfo /jointset/walker_knee_l/knee_angle_l/value: bounds=(0.001198337 1.446393)
            initial_bounds=0.2853451
        MocoVariableInfo /jointset/patellofemoral_l/knee_angle_l_beta/value: bounds=(0.001198337 1.446393)
            initial_bounds=0.2853451
        MocoVariableInfo /jointset/ankle_r/ankle_angle_r/value: bounds=(-0.4125182 0.330195)
            initial_bounds=0.0007431925
        MocoVariableInfo /jointset/ankle_l/ankle_angle_l/value: bounds=(-0.3735042 0.3440796) initial_bounds=0.2583014
      goals:
        MocoStateTrackingGoal state_tracking: weight=10 allow_unused_references=true scale_weights_with_range=false
          TableProcessor reference: filepath=C:\Users\Owen\Repositories\CapacitiveSensingKinematics\CSOptimalControl\OutputData\ik_OpenSim_Sub02_CSBaseline_Orientations.mot
          MocoWeightSet state_weights:
            MocoWeight /jointset/patellofemoral_r/knee_angle_r_beta/value: weight=0
            MocoWeight /jointset/patellofemoral_l/knee_angle_l_beta/value: weight=0
        MocoControlGoal control_effort: weight=0.001
          MocoWeightSet control_weights:
            MocoWeight /forceset/tau_pelvis_tilt: weight=100
            MocoWeight /forceset/tau_pelvis_list: weight=100
            MocoWeight /forceset/tau_pelvis_rotation: weight=100
            MocoWeight /forceset/tau_pelvis_tx: weight=100
            MocoWeight /forceset/tau_pelvis_ty: weight=100
            MocoWeight /forceset/tau_pelvis_tz: weight=100
        MocoCSTrackingGoal cs_tracking: weight=1000000
  MocoCasADiSolver solver:
    num_mesh_intervals: 25
    multibody_dynamics_mode: explicit
    optim_max_iterations: 1000
    optim_convergence_tolerance: 0.01
    optim_constraint_tolerance: 0.01
    guess_file: C:\Users\Owen\Repositories\CapacitiveSensingKinematics\CSOptimalControl\OutputData\InitializeMocoTrajectory.sto
    optim_finite_difference_scheme: forward
