# OpenSim document version 40000
ScaleTool subject01:
  mass: 56 [kg]
  height: 1.65
  age: 25
  notes: Insole Study Scale Settings
  GenericModelMaker:
    model_file: C:\Users\Owen\Repositories\CapacitiveSensingKinematics\CSOptimalControl\OutputData\OpenSimMOCOModelWithContactGeometry_init.osim
    marker_set_file: C:\Users\Owen\Repositories\CapacitiveSensingKinematics\CSOptimalControl\Setup\MarkerSet.xml
  ModelScaler:
    apply: true
    scaling_order: measurements
    marker_file: C:\Users\Owen\Repositories\CapacitiveSensingKinematics\CSOptimalControl\OutputData\OpenSim_Sub02_CSBaseline_markers.trc
    time_range: 0 5
    preserve_mass_distribution: true
    output_model_file: C:\Users\Owen\Repositories\CapacitiveSensingKinematics\CSOptimalControl\OutputData\OpenSimMOCOModelWithContactGeometry_scaled.osim
    MeasurementSet:
      Measurement pelvisX: apply=true
        MarkerPair: markers=(RASI RPS2)
        MarkerPair: markers=(LASI LPS2)
        BodyScale pelvis: axes=X
      Measurement pelvisY: apply=true
        MarkerPair: markers=(LASI LGTR)
        MarkerPair: markers=(RASI RGTR)
        BodyScale pelvis: axes=Y
      Measurement pelvisZ: apply=true
        MarkerPair: markers=(LGTR RGTR)
        BodyScale pelvis: axes=Z
      Measurement torsoX: apply=true
        MarkerPair: markers=(RASI RPS2)
        BodyScale torso: axes=X
      Measurement torsoY: apply=true
        MarkerPair: markers=(APEX LASI)
        MarkerPair: markers=(APEX RASI)
        BodyScale torso: axes=Y
      Measurement torsoZ: apply=true
        MarkerPair: markers=(RASI LASI)
        BodyScale torso: axes=Z
      Measurement femurZ: apply=true
        MarkerPair: markers=(RLEP RMEP)
        MarkerPair: markers=(LLEP LMEP)
        BodyScale femur_r: axes=Z
        BodyScale femur_l: axes=Z
      Measurement femurY: apply=true
        MarkerPair: markers=(RLEP RGTR)
        MarkerPair: markers=(LLEP LGTR)
        BodyScale femur_r: axes=Y
        BodyScale femur_l: axes=Y
      Measurement femurX: apply=true
        MarkerPair: markers=(RTTB RGTR)
        MarkerPair: markers=(LTTB LGTR)
        BodyScale femur_r: axes=X
        BodyScale femur_l: axes=X
      Measurement shankZ: apply=true
        MarkerPair: markers=(LLML LMML)
        MarkerPair: markers=(RLML RMML)
        BodyScale tibia_r: axes=Z
        BodyScale tibia_l: axes=Z
      Measurement shankY: apply=true
        MarkerPair: markers=(LLEP LLML)
        MarkerPair: markers=(RLEP RLML)
        BodyScale tibia_r: axes=Y
        BodyScale tibia_l: axes=Y
      Measurement shankX: apply=true
        MarkerPair: markers=(LCAL L2MT)
        MarkerPair: markers=(RCAL R2MT)
        BodyScale tibia_r: axes=X
        BodyScale tibia_l: axes=X
      Measurement feetX: apply=true
        MarkerPair: markers=(LCAL L1MT)
        MarkerPair: markers=(RCAL R1MT)
        BodyScale calcn_r: axes=X
        BodyScale toes_r: axes=X
        BodyScale calcn_l: axes=X
        BodyScale toes_l: axes=X
      Measurement feetY: apply=true
        MarkerPair: markers=(LCAL L2MT)
        MarkerPair: markers=(RCAL R2MT)
        BodyScale calcn_r: axes=Y
        BodyScale toes_r: axes=Y
        BodyScale calcn_l: axes=Y
        BodyScale toes_l: axes=Y
      Measurement feetZ: apply=true
        MarkerPair: markers=(RLML RMML)
        MarkerPair: markers=(LLML LMML)
        BodyScale calcn_r: axes=Z
        BodyScale toes_r: axes=Z
        BodyScale calcn_l: axes=Z
        BodyScale toes_l: axes=Z
  MarkerPlacer:
    apply: true
    marker_file: C:\Users\Owen\Repositories\CapacitiveSensingKinematics\CSOptimalControl\OutputData\OpenSim_Sub02_CSBaseline_markers.trc
    time_range: 0 5
    output_model_file: C:\Users\Owen\Repositories\CapacitiveSensingKinematics\CSOptimalControl\OutputData\OpenSimMOCOModelWithContactGeometry_placed.osim
    max_marker_movement: 0.001
    IKTaskSet gait2354_Scale:
      IKMarkerTask APEX: apply=true weight=100
      IKMarkerTask LASI: apply=true weight=100
      IKMarkerTask RASI: apply=true weight=100
      IKMarkerTask LPS1: apply=true weight=1
      IKMarkerTask LPS2: apply=true weight=1
      IKMarkerTask RPS1: apply=true weight=1
      IKMarkerTask RPS2: apply=true weight=1
      IKMarkerTask LGTR: apply=true weight=1
      IKMarkerTask LLEP: apply=true weight=10
      IKMarkerTask LMEP: apply=true weight=10
      IKMarkerTask LTTB: apply=true weight=10
      IKMarkerTask LFBH: apply=true weight=1
      IKMarkerTask LLML: apply=true weight=10
      IKMarkerTask LMML: apply=true weight=10
      IKMarkerTask L2MT: apply=true weight=10
      IKMarkerTask L1MT: apply=true weight=10
      IKMarkerTask L5MT: apply=true weight=10
      IKMarkerTask LCAL: apply=true weight=1000
      IKMarkerTask RGTR: apply=true weight=1
      IKMarkerTask RLEP: apply=true weight=10
      IKMarkerTask RMEP: apply=true weight=10
      IKMarkerTask RTTB: apply=true weight=10
      IKMarkerTask RFBH: apply=true weight=1
      IKMarkerTask RLML: apply=true weight=10
      IKMarkerTask RMML: apply=true weight=10
      IKMarkerTask R2MT: apply=true weight=10
      IKMarkerTask R1MT: apply=true weight=10
      IKMarkerTask R5MT: apply=true weight=10
      IKMarkerTask RCAL: apply=true weight=1000
      IKMarkerTask RTH1: apply=true weight=100
      IKMarkerTask RTH2: apply=true weight=100
      IKMarkerTask RTH3: apply=true weight=100
      IKMarkerTask LTH1: apply=true weight=100
      IKMarkerTask LTH2: apply=true weight=100
      IKMarkerTask LTH3: apply=true weight=100
      IKMarkerTask RSH1: apply=true weight=100
      IKMarkerTask RSH2: apply=true weight=100
      IKMarkerTask RSH3: apply=true weight=100
