# OpenSim document version 40000
AnalyzeTool subject01:
  replace_force_set: false
  output_precision: 8
  initial_time: 0
  final_time: 100
  solve_for_equilibrium_for_auxiliary_states: false
  maximum_number_of_integrator_steps: 20000
  maximum_integrator_step_size: 1
  minimum_integrator_step_size: 1e-8
  integrator_error_tolerance: 1e-5
  lowpass_cutoff_frequency_for_coordinates: -1
  AnalysisSet Analyses:
    IMUDataReporter: compute_accelerations_without_forces=true start_time=0 end_time=100 step_interval=1
        in_degrees=false
