# OpenSim document version 40000
MarkerSet:
  Marker APEX: torso (-0.009134674 0.7782512 0.0009656253)
  Marker LASI: pelvis (0.01252871 0 -0.1358767) fixed=true
  Marker RASI: pelvis (0.01252871 0 0.1358767) fixed=true
  Marker LPS2: pelvis (-0.2187518 0.001863453 -0.03368268)
  Marker RPS2: pelvis (-0.2211847 -0.0007977918 0.03540217)
  Marker LGTR: pelvis (-0.09111791 -0.0829853 -0.1852864) fixed=true
  Marker LLEP: femur_l (0.002 -0.4032109 -0.05592771) fixed=true
  Marker LMEP: femur_l (0.0198986 -0.4021156 0.06085438) fixed=true
  Marker LTTB: tibia_l (0.0532884 -0.07053887 -0.006088647) fixed=true
  Marker LFBH: tibia_l (-0.005311197 -0.08128458 -0.05744349) fixed=true
  Marker LLML: tibia_l (0 -0.4089466 -0.04973816) fixed=true
  Marker LMML: tibia_l (0.000808589 -0.3962256 0.02798383) fixed=true
  Marker L2MT: toes_l (0.004338731 0.0533413 -0.001212682) fixed=true
  Marker L1MT: calcn_l (0.1994959 0.0453413 0.02613704) fixed=true
  Marker L5MT: calcn_l (0.1457437 0.0453413 -0.04914039) fixed=true
  Marker LCAL: calcn_l (-0.0112072 0.0371062 0.000632477) fixed=true
  Marker RGTR: pelvis (-0.09111791 -0.0829853 0.1852864) fixed=true
  Marker RLEP: femur_r (0.002 -0.4037282 0.05592771) fixed=true
  Marker RMEP: femur_r (0.009253 -0.4051104 -0.05842404) fixed=true
  Marker RTTB: tibia_r (0.0571613 -0.07307729 0.007519492) fixed=true
  Marker RFBH: tibia_r (-0.008811889 -0.08111126 0.05758558) fixed=true
  Marker RLML: tibia_r (0.0015924 -0.4088473 0.04878186) fixed=true
  Marker RMML: tibia_r (0.0193276 -0.3982441 -0.0301092) fixed=true
  Marker R2MT: toes_r (0.000530614 0.0533413 0.002482478) fixed=true
  Marker R1MT: calcn_r (0.1994959 0.0453413 -0.02613704) fixed=true
  Marker R5MT: calcn_r (0.1655592 0.0453413 0.05100078) fixed=true
  Marker RCAL: calcn_r (-0.00422372 0.0379921 -0.00654881) fixed=true
  Marker RTH1: femur_r (0.04735935 -0.076069 0.1008436)
  Marker RTH2: femur_r (0.04592884 -0.1709407 0.09075571)
  Marker RTH3: femur_r (-0.008809737 -0.1690824 0.1119322)
  Marker LTH1: femur_l (-0.005557349 -0.09224634 -0.1013041)
  Marker LTH3: femur_l (0.0459288 -0.1770458 -0.09347559)
  Marker LTH2: femur_l (-0.00880974 -0.1764916 -0.1063256)
  Marker RSH1: tibia_r (0.02277441 -0.1416872 0.05702206)
  Marker RSH2: tibia_r (0.02154763 -0.2140962 0.0570221)
  Marker RSH3: tibia_r (-0.02699344 -0.213237 0.0570221)
  Marker LSH1: tibia_l (-0.01571888 -0.1262443 -0.06039741)
  Marker LSH2: tibia_l (-0.01296697 -0.2135235 -0.05561806)
  Marker LSH3: tibia_l (0.03324571 -0.2107615 -0.05116923)
  Marker RPS1: pelvis (-0.2148025 0.06375982 0.03685974)
  Marker LPS1: pelvis (-0.208625 0.0437832 -0.0312188)
