# OpenSim document version 20302
ControlSet RRA Control Constraints:
  ControlLinear [values shared by the 16 below unless stated]: is_model_control=true extrapolate=true filter_on=false
      use_steps=false kp=100 kv=20
  ControlLinear FX.excitation: default_min=-200 default_max=200
  ControlLinear FY.excitation: default_min=-200 default_max=200
  ControlLinear FZ.excitation: default_min=-200 default_max=200
  ControlLinear MX.excitation: default_min=-500 default_max=500
  ControlLinear MY.excitation: default_min=-500 default_max=500
  ControlLinear MZ.excitation: default_min=-500 default_max=500
  ControlLinear hip_flexion_r.excitation: default_min=-10 default_max=10
  ControlLinear hip_adduction_r.excitation: default_min=-10 default_max=10
  ControlLinear hip_rotation_r.excitation: default_min=-10 default_max=10
  ControlLinear knee_angle_r.excitation: default_min=-10 default_max=10
  ControlLinear ankle_angle_r.excitation: default_min=-10 default_max=10
  ControlLinear hip_flexion_l.excitation: default_min=-1 default_max=1
  ControlLinear hip_adduction_l.excitation: default_min=-1 default_max=1
  ControlLinear hip_rotation_l.excitation: default_min=-1 default_max=1
  ControlLinear knee_angle_l.excitation: default_min=-1 default_max=1
  ControlLinear ankle_angle_l.excitation: default_min=-10 default_max=10
